# OpenSim document version 40500
Model ModelProcessed:
  gravity: 0 -9.80665 0
  length_units: meters
  force_units: N
  credits:
    Rajagopal et al. (2016), Lai et al. (2017), Uhlrich et al. (2022)
  publications:
    Rajagopal, A., Dembia, C.L., DeMers, M.S., Delp, D.D., Hicks, J.L., Delp, S.L. (2016) Full-body musculoskeletal model for muscle-driven simulation of human gait. IEEE Transactions on Biomedical Engineering.
  Ground
  BodySet:
    Body pelvis: mass=12.34962 [kg] mass_center=(-0.08168605 0 0) inertia=(0.1912655 0.1912655 0.08105023 0 0 0)
        meshes=(r_pelvis.vtp l_pelvis.vtp sacrum.vtp)
      WrapCylinder Gmax1_at_pelvis_r: xyz_body_rotation=(-0.6 0.45 0) translation=(-0.088965 -0.1143836 0.08510597)
          quadrant=-x radius=0.04851817 length=0.1940002
      WrapCylinder Gmax2_at_pelvis_r: xyz_body_rotation=(-0.75 0.39 0) translation=(-0.09243117 -0.09589734 0.09487223)
          quadrant=all radius=0.04896258 length=0.1270838
      WrapCylinder Gmax3_at_pelvis_r: xyz_body_rotation=(-0.1 0 0) translation=(-0.09589734 -0.1016743 0.09487223)
          quadrant=all radius=0.04626828 length=0.1392994
      WrapCylinder Gmax1_at_pelvis_l: xyz_body_rotation=(0.6 -0.45 0) translation=(-0.088965 -0.1143836 -0.08510597)
          quadrant=-x radius=0.04851817 length=0.1940002
      WrapCylinder Gmax2_at_pelvis_l: xyz_body_rotation=(0.75 -0.39 0)
          translation=(-0.09243117 -0.09589734 -0.09487223) quadrant=all radius=0.04896258 length=0.1270838
      WrapCylinder Gmax3_at_pelvis_l: xyz_body_rotation=(0.1 0 0) translation=(-0.09589734 -0.1016743 -0.09487223)
          quadrant=all radius=0.04626828 length=0.1392994
      WrapCylinder PS_at_brim_r: xyz_body_rotation=(-0.25 -0.27 0.1) translation=(-0.08549883 -0.06932338 0.0915238)
          quadrant=-y radius=0.05861017 length=0.1366836
      WrapCylinder PS_at_brim_l: xyz_body_rotation=(0.25 0.27 0.1) translation=(-0.08549883 -0.06932338 -0.0915238)
          quadrant=-y radius=0.05861017 length=0.1366836
      WrapCylinder IL_at_brim_r: xyz_body_rotation=(-0.32 -0.24 0.9) translation=(-0.08203266 -0.07510033 0.1054756)
          quadrant=-y radius=0.06450409 length=0.1361936
      WrapCylinder IL_at_brim_l: xyz_body_rotation=(0.32 0.24 0.9) translation=(-0.08203266 -0.07510033 -0.1054756)
          quadrant=-y radius=0.06450409 length=0.1361936
    Body femur_r: mass=9.753648 mass_center=(0 -0.1724733 0) inertia=(0.1445257 0.03788538 0.152405 0 0 0)
        meshes=r_femur.vtp
      WrapCylinder GasLat_at_condyles_r: translation=(0.005072743 -0.4159649 0) quadrant=all radius=0.02637826
          length=0.1014549
      WrapCylinder GasMed_at_condyles_r: translation=(0.005072743 -0.4159649 0) quadrant=all radius=0.02536372
          length=0.1014549
      WrapCylinder KnExt_at_fem_r: xyz_body_rotation=(-0.0623366 0.0507601 0)
          translation=(0.003640485 -0.4085912 0.002121533) quadrant=all radius=0.02536372 length=0.1014549
      WrapCylinder KnExtVL_at_fem_r: xyz_body_rotation=(-0.0623366 0.0507601 0)
          translation=(0.001915752 -0.4085912 0.002121533) quadrant=all radius=0.02536372 length=0.1014549
      WrapCylinder AB_at_femshaft_r: xyz_body_rotation=(1.66157 0.186644 0)
          translation=(0.01485644 -0.1142331 0.02370493) quadrant=all radius=0.01674005 length=0.07101841
      WrapCylinder AL_at_femshaft_r: xyz_body_rotation=(1.77711 0.136489 0)
          translation=(0.03117982 -0.235283 0.01533358) quadrant=all radius=0.02039243 length=0.1014549
      WrapCylinder AMprox_at_femshaft_r: xyz_body_rotation=(1.61126 0.18656 0)
          translation=(0.005258395 -0.07395532 0.02577258) quadrant=all radius=0.02140698 length=0.07101841
      WrapCylinder AMmid_at_femshaft_r: xyz_body_rotation=(1.61139 0.13656 0)
          translation=(0.0233473 -0.1630491 0.02088367) quadrant=all radius=0.02171134 length=0.1217458
      WrapCylinder AMdist_at_femshaft_r: xyz_body_rotation=(1.71188 0.186636 0)
          translation=(0.03206633 -0.2645294 0.009500842) quadrant=all radius=0.02211716 length=0.2029097
      WrapCylinder AMisch_at_condyles_r: xyz_body_rotation=(1.71115 -0.463363 0)
          translation=(-0.02298064 -0.3823134 -0.003200262) quadrant=all radius=0.04058195 length=0.2434917
      WrapCylinder PECT_at_femshaft_r: xyz_body_rotation=(1.81295 0.276344 0)
          translation=(0.006174269 -0.0857323 0.03088337) quadrant=all radius=0.01521823 length=0.05072743
    Body tibia_r: mass=3.887764 mass_center=(0 -0.1786142 0) inertia=(0.04837186 0.004894771 0.04904369 0 0 0)
        meshes=(r_tibia.vtp r_fibula.vtp)
      WrapCylinder GasLat_at_shank_r: xyz_body_rotation=(2.96723 -0.279725 -1.47812)
          translation=(-0.007079514 -0.07079514 -0.003157081) quadrant=-y radius=0.05261801 length=0.09566911
      WrapCylinder GasMed_at_shank_r: xyz_body_rotation=(2.96723 0.0279725 -1.47812)
          translation=(-0.007079514 -0.07079514 -0.003157081) quadrant=-y radius=0.05644477 length=0.09566911
      WrapCylinder GR_at_condyles_r: xyz_body_rotation=(0 -0.4 0) translation=(-0.002870073 -0.01913382 0) quadrant=all
          radius=0.03444088 length=0.09566911
      WrapCylinder SM_at_condyles_r: xyz_body_rotation=(0 -0.1 0) translation=(-0.0009566911 -0.01913382 0)
          quadrant=all radius=0.03300584 length=0.09566911
      WrapCylinder ST_at_condyles_r: xyz_body_rotation=(0 -0.2 0) translation=(-0.001913382 -0.01961217 0) quadrant=all
          radius=0.04065937 length=0.09566911
      WrapCylinder BF_at_gastroc_r: translation=(-0.03731095 -0.05740146 0) quadrant=y radius=0.02774404
          length=0.1435037
    Body patella_r: mass=0.09039118 mass_center=(0.001826188 0.02678408 0)
        inertia=(3.09775e-6 1.415035e-5 1.415035e-5 0 0 0) meshes=r_patella.vtp
    Body talus_r: mass=0.1048622 mass_center=(0 0 0) inertia=(0.0007031335 0.0007031335 0.0007031335 0 0 0)
        meshes=r_talus.vtp
    Body calcn_r: mass=1.310777 mass_center=(0.08188597 0.02456579 0)
        inertia=(0.0009843869 0.002742221 0.002882847 0 0 0) meshes=r_foot.vtp
    Body toes_r: mass=0.2271314 mass_center=(0.02833255 0.004913158 -0.01433005)
        inertia=(7.031335e-5 0.0001406267 0.0007031335 0 0 0) meshes=r_bofoot.vtp
    Body femur_l: mass=9.753648 mass_center=(0 -0.1731214 0) inertia=(0.1456139 0.03817063 0.1535525 0 0 0)
        meshes=l_femur.vtp
      WrapCylinder GasLat_at_condyles_l: translation=(0.005091804 -0.417528 0) quadrant=all radius=0.02647738
          length=0.1018361
      WrapCylinder GasMed_at_condyles_l: translation=(0.005091804 -0.417528 0) quadrant=all radius=0.02545902
          length=0.1018361
      WrapCylinder KnExt_at_fem_l: xyz_body_rotation=(0.0623366 -0.0507601 0)
          translation=(0.003654164 -0.4101265 -0.002129505) quadrant=all radius=0.02545902 length=0.1018361
      WrapCylinder KnExtVL_at_fem_l: xyz_body_rotation=(0.0623366 -0.0507601 0)
          translation=(0.001922951 -0.4101265 -0.002129505) quadrant=all radius=0.02545902 length=0.1018361
      WrapCylinder AB_at_femshaft_l: xyz_body_rotation=(-1.66157 -0.186644 0)
          translation=(0.01491227 -0.1146623 -0.023794) quadrant=all radius=0.01680295 length=0.07128526
      WrapCylinder AL_at_femshaft_l: xyz_body_rotation=(-1.77711 -0.136489 0)
          translation=(0.03129698 -0.2361671 -0.0153912) quadrant=all radius=0.02046905 length=0.1018361
      WrapCylinder AMprox_at_femshaft_l: xyz_body_rotation=(-1.61126 -0.18656 0)
          translation=(0.005278154 -0.07423321 -0.02586942) quadrant=all radius=0.02148741 length=0.07128526
      WrapCylinder AMmid_at_femshaft_l: xyz_body_rotation=(-1.61139 -0.13656 0)
          translation=(0.02343503 -0.1636618 -0.02096214) quadrant=all radius=0.02179292 length=0.1222033
      WrapCylinder AMdist_at_femshaft_l: xyz_body_rotation=(-1.71188 -0.186636 0)
          translation=(0.03218682 -0.2655233 -0.009536542) quadrant=all radius=0.02220027 length=0.2036722
      WrapCylinder AMisch_at_condyles_l: xyz_body_rotation=(-1.71115 0.463363 0)
          translation=(-0.02306699 -0.38375 0.003212287) quadrant=all radius=0.04073444 length=0.2444066
      WrapCylinder PECT_at_femshaft_l: xyz_body_rotation=(-1.81295 -0.276344 0)
          translation=(0.006197469 -0.08605445 -0.03099941) quadrant=all radius=0.01527541 length=0.05091804
    Body tibia_l: mass=3.887764 mass_center=(0 -0.1756528 0) inertia=(0.04678112 0.004733803 0.04743085 0 0 0)
        meshes=(l_tibia.vtp l_fibula.vtp)
      WrapCylinder GasLat_at_shank_l: xyz_body_rotation=(-2.96723 0.279725 -1.47812)
          translation=(-0.006962134 -0.06962134 0.003104735) quadrant=-y radius=0.05174559 length=0.09408289
      WrapCylinder GasMed_at_shank_l: xyz_body_rotation=(-2.96723 -0.0279725 -1.47812)
          translation=(-0.006962134 -0.06962134 0.003104735) quadrant=-y radius=0.0555089 length=0.09408289
      WrapCylinder GR_at_condyles_l: xyz_body_rotation=(0 0.4 0) translation=(-0.002822487 -0.01881658 0) quadrant=all
          radius=0.03386984 length=0.09408289
      WrapCylinder SM_at_condyles_l: xyz_body_rotation=(0 0.1 0) translation=(-0.0009408289 -0.01881658 0) quadrant=all
          radius=0.0324586 length=0.09408289
      WrapCylinder ST_at_condyles_l: xyz_body_rotation=(0 0.2 0) translation=(-0.001881658 -0.01928699 0) quadrant=all
          radius=0.03998523 length=0.09408289
      WrapCylinder BF_at_gastroc_l: translation=(-0.03669233 -0.05644973 0) quadrant=all radius=0.02728404
          length=0.1411243
    Body patella_l: mass=0.09039118 mass_center=(0.00183305 0.02688473 0)
        inertia=(3.121074e-6 1.425689e-5 1.425689e-5 0 0 0) meshes=l_patella.vtp
    Body talus_l: mass=0.1048622 mass_center=(0 0 0) inertia=(0.0007031335 0.0007031335 0.0007031335 0 0 0)
        meshes=l_talus.vtp
    Body calcn_l: mass=1.310777 mass_center=(0.08188597 0.02456579 0)
        inertia=(0.0009843869 0.002742221 0.002882847 0 0 0) meshes=l_foot.vtp
    Body toes_l: mass=0.2271314 mass_center=(0.02833255 0.004913158 0.01433005)
        inertia=(7.031335e-5 0.0001406267 0.0007031335 0 0 0) meshes=l_bofoot.vtp
    Body torso: mass=28.13095 mass_center=(-0.03246446 0.3462876 0) inertia=(1.888065 1.082547 1.888065 0 0 0)
        meshes=(hat_spine.vtp hat_jaw.vtp hat_skull.vtp hat_ribs_scap.vtp)
    Body humerus_r: mass=2.131323 mass_center=(0 -0.1813691 0) inertia=(0.01522739 0.005252979 0.01709226 0 0 0)
        meshes=humerus_rv.vtp
    Body ulna_r: mass=0.6370376 mass_center=(0 -0.1252893 0) inertia=(0.003356429 0.0007002949 0.003640853 0 0 0)
        meshes=ulna_rv.vtp
    Body radius_r: mass=0.6370376 mass_center=(0 -0.1252893 0) inertia=(0.003356429 0.0007002949 0.003640853 0 0 0)
        meshes=radius_rv.vtp
    Body hand_r: mass=0.4797443 mass_center=(0 -0.07078677 0) inertia=(0.001010782 0.0006198403 0.001518439 0 0 0)
        meshes=(pisiform_rvs.vtp lunate_rvs.vtp scaphoid_rvs.vtp triquetrum_rvs.vtp hamate_rvs.vtp capitate_rvs.vtp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)
    Body humerus_l: mass=2.131323 mass_center=(0 -0.1813691 0) inertia=(0.01522739 0.005252979 0.01709226 0 0 0)
        meshes=humerus_lv.vtp
    Body ulna_l: mass=0.6370376 mass_center=(0 -0.1252893 0) inertia=(0.003356429 0.0007002949 0.003640853 0 0 0)
        meshes=ulna_lv.vtp
    Body radius_l: mass=0.6370376 mass_center=(0 -0.1252893 0) inertia=(0.003356429 0.0007002949 0.003640853 0 0 0)
        meshes=radius_lv.vtp
    Body hand_l: mass=0.4797443 mass_center=(0 -0.07078677 0) inertia=(0.001010782 0.0006198403 0.001518439 0 0 0)
        meshes=(pisiform_lvs.vtp lunate_lvs.vtp scaphoid_lvs.vtp triquetrum_lvs.vtp hamate_lvs.vtp capitate_lvs.vtp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)
  JointSet:
    CustomJoint ground_pelvis: socket_parent_frame=ground_offset socket_child_frame=pelvis_offset
      Coordinate pelvis_tilt: default_value=0 range=(-1.570796 1.570796) clamped=true
      Coordinate pelvis_list: default_value=0 range=(-1.570796 1.570796) clamped=true
      Coordinate pelvis_rotation: default_value=0 range=(-100 100) clamped=true
      Coordinate pelvis_tx: default_value=0 range=(-100 100) clamped=true
      Coordinate pelvis_ty: default_value=0.93 range=(-30 30) clamped=true
      Coordinate pelvis_tz: default_value=0 range=(-100 100) clamped=true
      PhysicalOffsetFrame ground_offset: socket_parent=/ground translation=(0 0 0) [meters]
      PhysicalOffsetFrame pelvis_offset: socket_parent=/bodyset/pelvis translation=(0 0 0)
      SpatialTransform:
        TransformAxis rotation1: coordinates=pelvis_tilt axis=(0 0 1) LinearFunction(coefficients=1 0)
        TransformAxis rotation2: coordinates=pelvis_list axis=(1 0 0) LinearFunction(coefficients=1 0)
        TransformAxis rotation3: coordinates=pelvis_rotation axis=(0 1 0) LinearFunction(coefficients=1 0)
        TransformAxis translation1: coordinates=pelvis_tx axis=(1 0 0) LinearFunction(coefficients=1 0)
        TransformAxis translation2: coordinates=pelvis_ty axis=(0 1 0) LinearFunction(coefficients=1 0)
        TransformAxis translation3: coordinates=pelvis_tz axis=(0 0 1) LinearFunction(coefficients=1 0)
    CustomJoint hip_r: socket_parent_frame=pelvis_offset socket_child_frame=femur_r_offset
      Coordinate hip_flexion_r: default_value=0 range=(-0.5235988 2.094395) clamped=true
      Coordinate hip_adduction_r: default_value=0 range=(-0.8726646 0.5235988) clamped=true
      Coordinate hip_rotation_r: default_value=0 range=(-0.6981317 0.6981317) clamped=true
      PhysicalOffsetFrame pelvis_offset: socket_parent=/bodyset/pelvis translation=(-0.06502071 -0.09068653 0.1077916)
      PhysicalOffsetFrame femur_r_offset: socket_parent=/bodyset/femur_r translation=(0 0 0)
      SpatialTransform: axes_held_at_zero=(translation1 translation2 translation3)
        TransformAxis rotation1: coordinates=hip_flexion_r axis=(0 0 1) LinearFunction(coefficients=1 0)
        TransformAxis rotation2: coordinates=hip_adduction_r axis=(1 0 0) LinearFunction(coefficients=1 0)
        TransformAxis rotation3: coordinates=hip_rotation_r axis=(0 1 0) LinearFunction(coefficients=1 0)
    CustomJoint walker_knee_r: socket_parent_frame=femur_r_offset socket_child_frame=tibia_r_offset
      Coordinate knee_angle_r: default_value=0 range=(0 2.443461) clamped=true
      PhysicalOffsetFrame femur_r_offset: socket_parent=/bodyset/femur_r
          translation=(-0.004565469 -0.4155591 -0.00177546) orientation=(-1.64157 1.44618 1.5708) [radians]
      PhysicalOffsetFrame tibia_r_offset: socket_parent=/bodyset/tibia_r
          translation=(-0.007739191 -0.003381712 -0.001420438) orientation=(-1.64157 1.44618 1.5708)
      SpatialTransform:
        TransformAxis rotation1: coordinates=knee_angle_r axis=(1 0 0) LinearFunction(coefficients=1 0)
        TransformAxis rotation2: coordinates=knee_angle_r axis=(0 0 1)
          PolynomialFunction: coefficients=(0.01083209 -0.02521833 -0.03284781 0.07910001 -1.473252e-8)
        TransformAxis rotation3: coordinates=knee_angle_r axis=(0 1 0)
          PolynomialFunction: coefficients=(0.02516576 -0.1694801 0.3694993 -4.430358e-8)
        TransformAxis translation1: coordinates=knee_angle_r axis=(1 0 0)
          MultiplierFunction: scale=1.014549
            PolynomialFunction: coefficients=(0.0001590448 -0.00101515 0.001817511 2.641427e-5 -7.746564e-7)
        TransformAxis translation2: coordinates=knee_angle_r axis=(0 1 0)
          MultiplierFunction: scale=1.014549
            PolynomialFunction: coefficients=(-0.0005796878 0.005079766 -0.01144238 0.003936909 -2.51635e-5)
        TransformAxis translation3: coordinates=knee_angle_r axis=(0 0 1)
          MultiplierFunction: scale=1.014549
            PolynomialFunction: coefficients=(0.001208087 -0.004453611 0.0006116494 0.00626543 -1.461913e-5)
    CustomJoint patellofemoral_r: socket_parent_frame=femur_r_offset socket_child_frame=patella_r_offset
      Coordinate knee_angle_r_beta: default_value=0 range=(-99999.9 99999.9) clamped=false
      PhysicalOffsetFrame femur_r_offset: socket_parent=/bodyset/femur_r
          translation=(-0.008207699 -0.4138953 -0.002790009)
      PhysicalOffsetFrame patella_r_offset: socket_parent=/bodyset/patella_r translation=(0 0 0)
      SpatialTransform: axes_held_at_zero=(rotation2 rotation3)
        TransformAxis rotation1: coordinates=knee_angle_r_beta axis=(0 0 1)
          SimmSpline: x=(0 0.174533 0.349066 0.523599 0.698132 0.872665 1.0472 1.22173 1.39626 1.5708 1.74533 1.91986 2.0944)
              y=(0.00113686 -0.00629212 -0.105582 -0.253683 -0.414245 -0.579047 -0.747244 -0.91799 -1.09044 -1.26379 -1.43763 -1.61186 -1.78634)
        TransformAxis translation1: coordinates=knee_angle_r_beta axis=(1 0 0)
          MultiplierFunction: scale=1.014549
            SimmSpline: x=(0 0.174533 0.349066 0.523599 0.698132 0.872665 1.0472 1.22173 1.39626 1.5708 1.74533 1.91986 2.0944)
                y=(0.0524 0.0488 0.0437 0.0371 0.0296 0.0216 0.0136 0.0057 -0.0019 -0.0088 -0.0148 -0.0196 -0.0227)
        TransformAxis translation2: coordinates=knee_angle_r_beta axis=(0 1 0)
          MultiplierFunction: scale=1.014549
            SimmSpline: x=(0 0.174533 0.349066 0.523599 0.698132 0.872665 1.0472 1.22173 1.39626 1.5708 1.74533 1.91986 2.0944)
                y=(-0.0108 -0.019 -0.0263 -0.0322 -0.0367 -0.0395 -0.0408 -0.0404 -0.0384 -0.0349 -0.0301 -0.0245 -0.0187)
        TransformAxis translation3: axis=(0 0 1) MultiplierFunction(scale=1.014549, Constant(value=0.00275))
    PinJoint ankle_r: socket_parent_frame=tibia_r_offset socket_child_frame=talus_r_offset
      Coordinate ankle_angle_r: default_value=0 range=(-0.8726646 0.8726646) clamped=true
      PhysicalOffsetFrame tibia_r_offset: socket_parent=/bodyset/tibia_r translation=(-0.009566911 -0.3826764 0)
          orientation=(0.175895 -0.105208 0.0186622)
      PhysicalOffsetFrame talus_r_offset: socket_parent=/bodyset/talus_r translation=(0 0 0)
          orientation=(0.175895 -0.105208 0.0186622)
    PinJoint subtalar_r: socket_parent_frame=talus_r_offset socket_child_frame=calcn_r_offset
      Coordinate subtalar_angle_r: default_value=0 range=(-0.6108652 0.6108652) clamped=true
      PhysicalOffsetFrame talus_r_offset: socket_parent=/bodyset/talus_r
          translation=(-0.03993579 -0.03435117 0.006485369) orientation=(-1.76819 0.906223 1.8196)
      PhysicalOffsetFrame calcn_r_offset: socket_parent=/bodyset/calcn_r translation=(0 0 0)
          orientation=(-1.76819 0.906223 1.8196)
    PinJoint mtp_r: socket_parent_frame=calcn_r_offset socket_child_frame=toes_r_offset
      Coordinate mtp_angle_r: default_value=0 range=(-0.7853982 0.5235988) clamped=true
      PhysicalOffsetFrame calcn_r_offset: socket_parent=/bodyset/calcn_r
          translation=(0.1464121 -0.001637719 0.0008843685) orientation=(-3.14159 0.619901 0)
      PhysicalOffsetFrame toes_r_offset: socket_parent=/bodyset/toes_r translation=(0 0 0)
          orientation=(-3.14159 0.619901 0)
    CustomJoint hip_l: socket_parent_frame=pelvis_offset socket_child_frame=femur_l_offset
      Coordinate hip_flexion_l: default_value=0 range=(-0.5235988 2.094395) clamped=true
      Coordinate hip_adduction_l: default_value=0 range=(-0.8726646 0.5235988) clamped=true
      Coordinate hip_rotation_l: default_value=0 range=(-0.6981317 0.6981317) clamped=true
      PhysicalOffsetFrame pelvis_offset: socket_parent=/bodyset/pelvis translation=(-0.06502071 -0.09068653 -0.1077916)
      PhysicalOffsetFrame femur_l_offset: socket_parent=/bodyset/femur_l translation=(0 0 0)
      SpatialTransform: axes_held_at_zero=(translation1 translation2 translation3)
        TransformAxis rotation1: coordinates=hip_flexion_l axis=(0 0 1) LinearFunction(coefficients=1 0)
        TransformAxis rotation2: coordinates=hip_adduction_l axis=(1 0 0) LinearFunction(coefficients=-1 0)
        TransformAxis rotation3: coordinates=hip_rotation_l axis=(0 1 0) LinearFunction(coefficients=-1 0)
    CustomJoint walker_knee_l: socket_parent_frame=femur_l_offset socket_child_frame=tibia_l_offset
      Coordinate knee_angle_l: default_value=0 range=(0 2.443461) clamped=true
      PhysicalOffsetFrame femur_l_offset: socket_parent=/bodyset/femur_l
          translation=(-0.004582624 -0.4171206 0.001782132) orientation=(1.64157 -1.44618 1.5708)
      PhysicalOffsetFrame tibia_l_offset: socket_parent=/bodyset/tibia_l
          translation=(-0.007610873 -0.003325642 0.001396886) orientation=(1.64157 -1.44618 1.5708)
      SpatialTransform:
        TransformAxis rotation1: coordinates=knee_angle_l axis=(-1 0 0) LinearFunction(coefficients=1 0)
        TransformAxis rotation2: coordinates=knee_angle_l axis=(0 0 1)
          PolynomialFunction: coefficients=(0.01083209 -0.02521833 -0.03284781 0.07910001 -1.473252e-8)
        TransformAxis rotation3: coordinates=knee_angle_l axis=(0 1 0)
          PolynomialFunction: coefficients=(-0.02516576 0.1694801 -0.3694993 4.430358e-8)
        TransformAxis translation1: coordinates=knee_angle_l axis=(1 0 0)
          MultiplierFunction: scale=1.018361
            PolynomialFunction: coefficients=(0.0001590448 -0.00101515 0.001817511 2.641427e-5 -7.746564e-7)
        TransformAxis translation2: coordinates=knee_angle_l axis=(0 1 0)
          MultiplierFunction: scale=1.018361
            PolynomialFunction: coefficients=(-0.0005796878 0.005079766 -0.01144238 0.003936909 -2.51635e-5)
        TransformAxis translation3: coordinates=knee_angle_l axis=(0 0 1)
          MultiplierFunction: scale=1.018361
            PolynomialFunction: coefficients=(-0.001208087 0.004453611 -0.0006116494 -0.00626543 1.461913e-5)
    CustomJoint patellofemoral_l: socket_parent_frame=femur_l_offset socket_child_frame=patella_l_offset
      Coordinate knee_angle_l_beta: default_value=0 range=(-99999.9 99999.9) clamped=false
      PhysicalOffsetFrame femur_l_offset: socket_parent=/bodyset/femur_l
          translation=(-0.00823854 -0.4154505 0.002800492)
      PhysicalOffsetFrame patella_l_offset: socket_parent=/bodyset/patella_l translation=(0 0 0)
      SpatialTransform: axes_held_at_zero=(rotation2 rotation3)
        TransformAxis rotation1: coordinates=knee_angle_l_beta axis=(0 0 1)
          SimmSpline: x=(0 0.174533 0.349066 0.523599 0.698132 0.872665 1.0472 1.22173 1.39626 1.5708 1.74533 1.91986 2.0944)
              y=(0.00113686 -0.00629212 -0.105582 -0.253683 -0.414245 -0.579047 -0.747244 -0.91799 -1.09044 -1.26379 -1.43763 -1.61186 -1.78634)
        TransformAxis translation1: coordinates=knee_angle_l_beta axis=(1 0 0)
          MultiplierFunction: scale=1.018361
            SimmSpline: x=(0 0.174533 0.349066 0.523599 0.698132 0.872665 1.0472 1.22173 1.39626 1.5708 1.74533 1.91986 2.0944)
                y=(0.0524 0.0488 0.0437 0.0371 0.0296 0.0216 0.0136 0.0057 -0.0019 -0.0088 -0.0148 -0.0196 -0.0227)
        TransformAxis translation2: coordinates=knee_angle_l_beta axis=(0 1 0)
          MultiplierFunction: scale=1.018361
            SimmSpline: x=(0 0.174533 0.349066 0.523599 0.698132 0.872665 1.0472 1.22173 1.39626 1.5708 1.74533 1.91986 2.0944)
                y=(-0.0108 -0.019 -0.0263 -0.0322 -0.0367 -0.0395 -0.0408 -0.0404 -0.0384 -0.0349 -0.0301 -0.0245 -0.0187)
        TransformAxis translation3: axis=(0 0 1) MultiplierFunction(scale=1.018361, Constant(value=-0.00275))
    PinJoint ankle_l: socket_parent_frame=tibia_l_offset socket_child_frame=talus_l_offset
      Coordinate ankle_angle_l: default_value=0 range=(-0.8726646 0.8726646) clamped=true
      PhysicalOffsetFrame tibia_l_offset: socket_parent=/bodyset/tibia_l translation=(-0.009408289 -0.3763316 0)
          orientation=(-0.175895 0.105208 0.0186622)
      PhysicalOffsetFrame talus_l_offset: socket_parent=/bodyset/talus_l translation=(0 0 0)
          orientation=(-0.175895 0.105208 0.0186622)
    PinJoint subtalar_l: socket_parent_frame=talus_l_offset socket_child_frame=calcn_l_offset
      Coordinate subtalar_angle_l: default_value=0 range=(-0.6108652 0.6108652) clamped=true
      PhysicalOffsetFrame talus_l_offset: socket_parent=/bodyset/talus_l
          translation=(-0.03993579 -0.03435117 -0.006485369) orientation=(1.76819 -0.906223 1.8196)
      PhysicalOffsetFrame calcn_l_offset: socket_parent=/bodyset/calcn_l translation=(0 0 0)
          orientation=(1.76819 -0.906223 1.8196)
    PinJoint mtp_l: socket_parent_frame=calcn_l_offset socket_child_frame=toes_l_offset
      Coordinate mtp_angle_l: default_value=0 range=(-0.7853982 0.5235988) clamped=true
      PhysicalOffsetFrame calcn_l_offset: socket_parent=/bodyset/calcn_l
          translation=(0.1464121 -0.001637719 -0.0008843685) orientation=(-3.14159 -0.619901 0)
      PhysicalOffsetFrame toes_l_offset: socket_parent=/bodyset/toes_l translation=(0 0 0)
          orientation=(-3.14159 -0.619901 0)
    CustomJoint back: socket_parent_frame=pelvis_offset socket_child_frame=torso_offset
      Coordinate lumbar_extension: default_value=0 range=(-1.570796 1.570796) clamped=true
      Coordinate lumbar_bending: default_value=0 range=(-1.570796 1.570796) clamped=true
      Coordinate lumbar_rotation: default_value=0 range=(-1.570796 1.570796) clamped=true
      PhysicalOffsetFrame pelvis_offset: socket_parent=/bodyset/pelvis translation=(-0.1163477 0.09416425 0)
      PhysicalOffsetFrame torso_offset: socket_parent=/bodyset/torso translation=(0 0 0)
      SpatialTransform: axes_held_at_zero=(translation1 translation2 translation3)
        TransformAxis rotation1: coordinates=lumbar_extension axis=(0 0 1) LinearFunction(coefficients=1 0)
        TransformAxis rotation2: coordinates=lumbar_bending axis=(1 0 0) LinearFunction(coefficients=1 0)
        TransformAxis rotation3: coordinates=lumbar_rotation axis=(0 1 0) LinearFunction(coefficients=1 0)
    CustomJoint acromial_r: socket_parent_frame=torso_offset socket_child_frame=humerus_r_offset
      Coordinate arm_flex_r: default_value=0 range=(-10 10) clamped=true
      Coordinate arm_add_r: default_value=0 range=(-10 10) clamped=true
      Coordinate arm_rot_r: default_value=0 range=(-10 10) clamped=true
      PhysicalOffsetFrame torso_offset: socket_parent=/bodyset/torso translation=(0.00341418 0.4020183 0.2146621)
      PhysicalOffsetFrame humerus_r_offset: socket_parent=/bodyset/humerus_r translation=(0 0 0)
      SpatialTransform: axes_held_at_zero=(translation1 translation2 translation3)
        TransformAxis rotation1: coordinates=arm_flex_r axis=(0 0 1) LinearFunction(coefficients=1 0)
        TransformAxis rotation2: coordinates=arm_add_r axis=(1 0 0) LinearFunction(coefficients=1 0)
        TransformAxis rotation3: coordinates=arm_rot_r axis=(0 1 0) LinearFunction(coefficients=1 0)
    PinJoint elbow_r: socket_parent_frame=humerus_r_offset socket_child_frame=ulna_r_offset
      Coordinate elbow_flex_r: default_value=0 range=(0 2.618) clamped=true
      PhysicalOffsetFrame humerus_r_offset: socket_parent=/bodyset/humerus_r
          translation=(0.01449171 -0.3156258 -0.01057882) orientation=(-0.0228627 0.228018 0.0051689)
      PhysicalOffsetFrame ulna_r_offset: socket_parent=/bodyset/ulna_r translation=(0 0 0)
          orientation=(-0.0228627 0.228018 0.0051689)
    PinJoint radioulnar_r: socket_parent_frame=ulna_r_offset socket_child_frame=radius_r_offset
      Coordinate pro_sup_r: default_value=0 range=(0 2.09) clamped=true
      PhysicalOffsetFrame ulna_r_offset: socket_parent=/bodyset/ulna_r
          translation=(-0.006992915 -0.01352116 0.02711405) orientation=(-1.56884 0.056428 1.53614)
      PhysicalOffsetFrame radius_r_offset: socket_parent=/bodyset/radius_r translation=(0 0 0)
          orientation=(-1.56884 0.056428 1.53614)
    WeldJoint radius_hand_r: socket_parent_frame=radius_r_offset socket_child_frame=hand_r_offset
      PhysicalOffsetFrame radius_r_offset: socket_parent=/bodyset/radius_r
          translation=(-0.009144742 -0.2451637 0.014148) orientation=(-1.5708 0 -1.5708)
      PhysicalOffsetFrame hand_r_offset: socket_parent=/bodyset/hand_r translation=(0 0 0)
          orientation=(-1.5708 0 -1.5708)
    CustomJoint acromial_l: socket_parent_frame=torso_offset socket_child_frame=humerus_l_offset
      Coordinate arm_flex_l: default_value=0 range=(-10 10) clamped=true
      Coordinate arm_add_l: default_value=0 range=(-10 10) clamped=true
      Coordinate arm_rot_l: default_value=0 range=(-10 10) clamped=true
      PhysicalOffsetFrame torso_offset: socket_parent=/bodyset/torso translation=(0.00341418 0.4020183 -0.2146621)
      PhysicalOffsetFrame humerus_l_offset: socket_parent=/bodyset/humerus_l translation=(0 0 0)
      SpatialTransform: axes_held_at_zero=(translation1 translation2 translation3)
        TransformAxis rotation1: coordinates=arm_flex_l axis=(0 0 1) LinearFunction(coefficients=1 0)
        TransformAxis rotation2: coordinates=arm_add_l axis=(-1 0 0) LinearFunction(coefficients=1 0)
        TransformAxis rotation3: coordinates=arm_rot_l axis=(0 -1 0) LinearFunction(coefficients=1 0)
    PinJoint elbow_l: socket_parent_frame=humerus_l_offset socket_child_frame=ulna_l_offset
      Coordinate elbow_flex_l: default_value=0 range=(0 2.618) clamped=true
      PhysicalOffsetFrame humerus_l_offset: socket_parent=/bodyset/humerus_l
          translation=(0.01449171 -0.3156258 0.01057882) orientation=(0.0228627 -0.228018 0.0051689)
      PhysicalOffsetFrame ulna_l_offset: socket_parent=/bodyset/ulna_l translation=(0 0 0)
          orientation=(0.0228627 -0.228018 0.0051689)
    PinJoint radioulnar_l: socket_parent_frame=ulna_l_offset socket_child_frame=radius_l_offset
      Coordinate pro_sup_l: default_value=0 range=(0 2.09) clamped=true
      PhysicalOffsetFrame ulna_l_offset: socket_parent=/bodyset/ulna_l
          translation=(-0.006992915 -0.01352116 -0.02711405) orientation=(1.56884 -0.056428 1.53614)
      PhysicalOffsetFrame radius_l_offset: socket_parent=/bodyset/radius_l translation=(0 0 0)
          orientation=(1.56884 -0.056428 1.53614)
    WeldJoint radius_hand_l: socket_parent_frame=radius_l_offset socket_child_frame=hand_l_offset
      PhysicalOffsetFrame radius_l_offset: socket_parent=/bodyset/radius_l
          translation=(-0.009144742 -0.2451637 -0.014148) orientation=(1.5708 0 1.5708)
      PhysicalOffsetFrame hand_l_offset: socket_parent=/bodyset/hand_l translation=(0 0 0)
          orientation=(1.5708 0 1.5708)
  ConstraintSet:
    CoordinateCouplerConstraint patellofemoral_knee_angle_r_con: independent_coordinate_names=knee_angle_r
        dependent_coordinate_name=knee_angle_r_beta scale_factor=1
        coupled_coordinates_function=LinearFunction(coefficients=1 0)
    CoordinateCouplerConstraint patellofemoral_knee_angle_l_con: independent_coordinate_names=knee_angle_l
        dependent_coordinate_name=knee_angle_l_beta scale_factor=1
        coupled_coordinates_function=LinearFunction(coefficients=1 0)
  ForceSet:
    Millard2012EquilibriumMuscle [values shared by the 80 below unless stated]: fiber_damping=0.01
        default_activation=0.01 minimum_activation=0.01
      ActiveForceLengthCurve: min_norm_active_fiber_length=0.25 transition_norm_fiber_length=0.77
          max_norm_active_fiber_length=1.9 shallow_ascending_slope=0.75 minimum_value=0
      ForceVelocityCurve: concentric_slope_at_vmax=0 concentric_slope_near_vmax=0.25 isometric_slope=5
          eccentric_slope_at_vmax=0 eccentric_slope_near_vmax=0.15 max_eccentric_velocity_force_multiplier=1.4
      FiberForceLengthCurve: strain_at_zero_force=0 strain_at_one_norm_force=0.7
      TendonForceLengthCurve
    Millard2012EquilibriumMuscle addbrev_r: max_isometric_force=625.8197 optimal_fiber_length=0.1160473
        tendon_slack_length=0.03990215 pennation_angle_at_optimal=0.1147809 [radians]
      PathPoint P1: pelvis (-0.02206794 -0.1086066 0.02148577)
      PathPoint P2: femur_r (-0.002029097 -0.1197167 0.02526226)
      PathWrap: wrap_object=AB_at_femshaft_r method=hybrid
    Millard2012EquilibriumMuscle addlong_r: max_isometric_force=916.8 optimal_fiber_length=0.1130583
        tendon_slack_length=0.1377173 pennation_angle_at_optimal=0.1377704
      PathPoint P1: pelvis (-0.008757853 -0.1027141 0.026341)
      PathPoint P2: femur_r (0.01142382 -0.2428525 0.01606031)
      PathWrap: wrap_object=AL_at_femshaft_r method=hybrid
    Millard2012EquilibriumMuscle addmagDist_r: max_isometric_force=597.2951 optimal_fiber_length=0.1780546
        tendon_slack_length=0.08780213 pennation_angle_at_optimal=0.194705
      PathPoint P1: pelvis (-0.08554505 -0.1475086 0.05555606)
      PathPoint P2: femur_r (0.01141367 -0.266319 0.01958079)
      PathWrap: wrap_object=AMdist_at_femshaft_r method=hybrid
    Millard2012EquilibriumMuscle addmagIsch_r: max_isometric_force=597.2951 optimal_fiber_length=0.1555367
        tendon_slack_length=0.2154243 pennation_angle_at_optimal=0.1680443
      PathPoint P1: pelvis (-0.103546 -0.1499234 0.05819295)
      PathPoint P2: femur_r (0.004879979 -0.3936144 -0.03320618)
      PathWrap: wrap_object=AMisch_at_condyles_r method=hybrid
    Millard2012EquilibriumMuscle addmagMid_r: max_isometric_force=597.2951 optimal_fiber_length=0.1456766
        tendon_slack_length=0.04932871 pennation_angle_at_optimal=0.2073076
      PathPoint P1: pelvis (-0.06084282 -0.1395133 0.03981843)
      PathPoint P2: femur_r (0.002455208 -0.1647627 0.02964511)
      PathWrap: wrap_object=AMmid_at_femshaft_r method=hybrid
    Millard2012EquilibriumMuscle addmagProx_r: max_isometric_force=597.2951 optimal_fiber_length=0.1253896
        tendon_slack_length=0.04788091 pennation_angle_at_optimal=0.3114833
      PathPoint P1: pelvis (-0.03579397 -0.1242622 0.0190442)
      PathPoint P2: femur_r (-0.01549216 -0.08000731 0.03248585)
      PathWrap: wrap_object=AMprox_at_femshaft_r method=hybrid
    Millard2012EquilibriumMuscle bflh_r: max_isometric_force=1313.184 optimal_fiber_length=0.09732811
        tendon_slack_length=0.331572 pennation_angle_at_optimal=0.1759182
      PathPoint P1: pelvis (-0.1201605 -0.1376069 0.08175754)
      PathPoint P2: tibia_r (-0.03287191 -0.03490009 0.03461308)
      PathPoint P3: tibia_r (-0.02586893 -0.04791109 0.03325458)
    Millard2012EquilibriumMuscle bfsh_r: max_isometric_force=557.1148 optimal_fiber_length=0.1109957
        tendon_slack_length=0.1064847 pennation_angle_at_optimal=0.2642232
      PathPoint P1: femur_r (0.005072743 -0.2141712 0.02374044)
      PathPoint P2: tibia_r (-0.02741877 -0.03141773 0.03065238)
      PathWrap: wrap_object=BF_at_gastroc_r method=hybrid
    Millard2012EquilibriumMuscle edl_r: max_isometric_force=603.4982 optimal_fiber_length=0.06274068
        tendon_slack_length=0.3339608 pennation_angle_at_optimal=0.2182582
      PathPoint P1: tibia_r (-0.01530706 -0.1106892 0.01961217)
      PathPoint P2: tibia_r (0.01568973 -0.3597158 0.01071494)
      PathPoint P3: calcn_r (0.07525321 0.02947895 0.0006550878)
      PathPoint P4: calcn_r (0.1323277 0.004503729 0.01064518)
      PathPoint P5: toes_r (0.0002456579 0.003848641 0.01252855)
      PathPoint P6: toes_r (0.03627549 -0.0003275439 0.02047149)
    Millard2012EquilibriumMuscle ehl_r: max_isometric_force=285.8675 optimal_fiber_length=0.06722271
        tendon_slack_length=0.2936907 pennation_angle_at_optimal=0.1972681
      PathPoint P1: tibia_r (-0.01339368 -0.1482871 0.01808146)
      PathPoint P2: tibia_r (0.006792507 -0.2783014 0.01568973)
      PathPoint P3: tibia_r (0.01913382 -0.353306 -0.002678735)
      PathPoint P4: calcn_r (0.07942939 0.03185364 -0.01727794)
      PathPoint P5: calcn_r (0.1058786 0.02530277 -0.0210447)
      PathPoint P6: calcn_r (0.1419903 0.01138215 -0.02292807)
      PathPoint P7: toes_r (0.02440202 0.003357325 -0.02006206)
      PathPoint P8: toes_r (0.0461018 0.002784123 -0.01523079)
    Millard2012EquilibriumMuscle fdl_r: max_isometric_force=423.177 optimal_fiber_length=0.03965527
        tendon_slack_length=0.3367789 pennation_angle_at_optimal=0.2248391
      PathPoint P1: tibia_r (-0.002200389 -0.1752658 -0.001722044)
      PathPoint P2: tibia_r (-0.01683776 -0.3487139 -0.01186297)
      PathPoint P3: calcn_r (0.03570228 0.02579408 -0.02292807)
      PathPoint P4: calcn_r (0.05797527 0.01441193 -0.02153601)
      PathPoint P5: calcn_r (0.1357669 -0.006632764 0.009498773)
      PathPoint P6: toes_r (-0.001555833 -0.006387106 0.01203724)
      PathPoint P7: toes_r (0.0233375 -0.005813904 0.01760548)
      PathPoint P8: toes_r (0.03611171 -0.004913158 0.01981641)
    Millard2012EquilibriumMuscle fhl_r: max_isometric_force=907.8393 optimal_fiber_length=0.04648795
        tendon_slack_length=0.3125717 pennation_angle_at_optimal=0.2580255
      PathPoint P1: tibia_r (-0.02965742 -0.2069323 0.01913382)
      PathPoint P2: tibia_r (-0.02315192 -0.3512013 -0.007270852)
      PathPoint P3: calcn_r (0.03062535 0.02260053 -0.01973452)
      PathPoint P4: calcn_r (0.08499764 0.005568246 -0.02096281)
      PathPoint P5: calcn_r (0.1413352 -0.004339957 -0.02202733)
      PathPoint P6: toes_r (0.01269233 -0.005240702 -0.02169978)
      PathPoint P7: toes_r (0.04601992 -0.008352369 -0.01482136)
    Millard2012EquilibriumMuscle gaslat_r: max_isometric_force=1575.059 optimal_fiber_length=0.06596305
        tendon_slack_length=0.3575388 pennation_angle_at_optimal=0.2102268
      PathPoint P1: femur_r (0.002029097 -0.386543 0.02088956)
      PathPoint P2: calcn_r (0.003602983 0.02538465 -0.004339957)
      PathWrap: wrap_object=GasLat_at_shank_r method=hybrid
      PathWrap pathwrap_0: wrap_object=GasLat_at_condyles_r method=hybrid
    Millard2012EquilibriumMuscle gasmed_r: max_isometric_force=3115.515 optimal_fiber_length=0.05644107
        tendon_slack_length=0.3702151 pennation_angle_at_optimal=0.1656816
      PathPoint P1: femur_r (0.006087292 -0.3906012 -0.02232007)
      PathPoint P2: calcn_r (0.003602983 0.02538465 -0.004339957)
      PathWrap: wrap_object=GasMed_at_shank_r method=hybrid
      PathWrap pathwrap_0: wrap_object=GasMed_at_condyles_r method=hybrid
    Millard2012EquilibriumMuscle glmax1_r: max_isometric_force=983.7836 optimal_fiber_length=0.1649143
        tendon_slack_length=0.0979389 pennation_angle_at_optimal=0.3540118
      PathPoint P1: pelvis (-0.1422285 0.03986094 0.07854862)
      PathPoint P2: pelvis (-0.1452325 -0.02796043 0.1086845)
      PathPoint P3: femur_r (-0.04504596 -0.03307429 0.03063937)
      PathPoint P4: femur_r (-0.028103 -0.05742345 0.04768379)
      PathWrap: wrap_object=Gmax1_at_pelvis_r method=hybrid
    Millard2012EquilibriumMuscle glmax2_r: max_isometric_force=1406.046 optimal_fiber_length=0.1748472
        tendon_slack_length=0.1213908 pennation_angle_at_optimal=0.3673821
      PathPoint P1: pelvis (-0.1521648 0.01005189 0.06445731)
      PathPoint P2: pelvis (-0.1552844 -0.07036323 0.1134281)
      PathPoint P3: femur_r (-0.04565469 -0.05924964 0.02556663)
      PathPoint P4: femur_r (-0.01582696 -0.1030781 0.04250959)
      PathWrap: wrap_object=Gmax2_at_pelvis_r method=hybrid
    Millard2012EquilibriumMuscle glmax3_r: max_isometric_force=947.7541 optimal_fiber_length=0.1868601
        tendon_slack_length=0.115249 pennation_angle_at_optimal=0.3824161
      PathPoint P1: pelvis (-0.1502007 -0.06065795 0.01255662)
      PathPoint P2: pelvis (-0.1470811 -0.1459257 0.06069032)
      PathPoint P3: femur_r (-0.02850882 -0.1141367 0.009536757)
      PathPoint P4: femur_r (-0.006087292 -0.1439645 0.04169795)
      PathWrap: wrap_object=Gmax3_at_pelvis_r method=hybrid
    Millard2012EquilibriumMuscle glmed1_r: max_isometric_force=1093.467 optimal_fiber_length=0.08551964
        tendon_slack_length=0.06539737 pennation_angle_at_optimal=0.3165559
      PathPoint P1: pelvis (-0.05661409 0.03004013 0.1604457)
      PathPoint P2_0: femur_r (-0.01420368 -0.01826188 0.05985837)
    Millard2012EquilibriumMuscle glmed2_r: max_isometric_force=765.0917 optimal_fiber_length=0.09484822
        tendon_slack_length=0.08519403 pennation_angle_at_optimal=0.3165559
      PathPoint P1: pelvis (-0.09820812 0.06354643 0.1144047)
      PathPoint P2_0: femur_r (-0.02232007 -0.01014549 0.05681472)
    Millard2012EquilibriumMuscle glmed3_r: max_isometric_force=871.1993 optimal_fiber_length=0.0887874
        tendon_slack_length=0.05502318 pennation_angle_at_optimal=0.3165559
      PathPoint P1: pelvis (-0.115539 0.01848623 0.08929151)
      PathPoint P2_0: femur_r (-0.03134955 -0.004768379 0.05255362)
    Millard2012EquilibriumMuscle glmin1_r: max_isometric_force=374.0459 optimal_fiber_length=0.09117662
        tendon_slack_length=0.02164463 pennation_angle_at_optimal=0.1745329
      PathPoint P1: pelvis (-0.03466169 0 0.1646312)
      PathPoint P2: femur_r (0.005072743 -0.01521823 0.05681472)
    Millard2012EquilibriumMuscle glmin2_r: max_isometric_force=394.8197 optimal_fiber_length=0.07653051
        tendon_slack_length=0.03566968 pennation_angle_at_optimal=0
      PathPoint P1: pelvis (-0.071172 0.0115539 0.1409132)
      PathPoint P2: femur_r (0.004058195 -0.009130938 0.05275653)
    Millard2012EquilibriumMuscle glmin3_r: max_isometric_force=446.7738 optimal_fiber_length=0.03892479
        tendon_slack_length=0.05204674 pennation_angle_at_optimal=0.01745329
      PathPoint P1: pelvis (-0.09116024 -0.01790854 0.1113354)
      PathPoint P2: femur_r (-0.004058195 -0.001014549 0.05174198)
    Millard2012EquilibriumMuscle grac_r: max_isometric_force=281.3115 optimal_fiber_length=0.2258883
        tendon_slack_length=0.1705703 pennation_angle_at_optimal=0.1720016
      PathPoint P1: pelvis (-0.05471925 -0.149415 0.03426562)
      PathPoint P2: tibia_r (-0.01762225 -0.04549066 -0.02832762)
      PathPoint P3: tibia_r (0.00170291 -0.06660483 -0.01504875)
      PathWrap: wrap_object=GR_at_condyles_r method=hybrid
    Millard2012EquilibriumMuscle iliacus_r: max_isometric_force=1021.141 optimal_fiber_length=0.119557
        tendon_slack_length=0.107804 pennation_angle_at_optimal=0.279914
      PathPoint P1: pelvis (-0.06990107 0.03570154 0.1176137)
      PathPoint P2: pelvis (-0.01559776 -0.0643552 0.1054756)
      PathPoint P3: femur_r (-0.002333462 -0.057322 0.01410223)
      PathPoint P4: femur_r (-0.01237749 -0.06462675 0.01988515)
      PathWrap: wrap_object=IL_at_brim_r method=hybrid range=(2 3)
    Millard2012EquilibriumMuscle perbrev_r: max_isometric_force=521.2016 optimal_fiber_length=0.04226113
        tendon_slack_length=0.1373278 pennation_angle_at_optimal=0.2052361
      PathPoint P1: tibia_r (-0.02324759 -0.2422342 0.02401295)
      PathPoint P2: tibia_r (-0.03243183 -0.3724398 0.02382161)
      PathPoint P3: tibia_r (-0.0272657 -0.3830591 0.02439562)
      PathPoint P4: calcn_r (0.03856829 0.02210921 0.01907943)
      PathPoint P5: calcn_r (0.0554368 0.01793303 0.02808689)
    Millard2012EquilibriumMuscle perlong_r: max_isometric_force=1115.371 optimal_fiber_length=0.04650267
        tendon_slack_length=0.3041172 pennation_angle_at_optimal=0.2479525
      PathPoint P1: tibia_r (-0.01913382 -0.1313537 0.02697869)
      PathPoint P2: tibia_r (-0.03032711 -0.3731095 0.02267358)
      PathPoint P3: tibia_r (-0.026022 -0.3840158 0.02296059)
      PathPoint P4: calcn_r (0.03586606 0.01883377 0.0180968)
      PathPoint P5: calcn_r (0.05576435 0.008679913 0.02325562)
      PathPoint P6: calcn_r (0.06976685 0.005650132 0.009662545)
      PathPoint P7: calcn_r (0.09850883 0.006960308 -0.01506702)
    Millard2012EquilibriumMuscle piri_r: max_isometric_force=1029.787 optimal_fiber_length=0.03177809
        tendon_slack_length=0.1404424 pennation_angle_at_optimal=0.1745329
      PathPoint P1: pelvis (-0.1176302 -0.007544694 0.01884888)
      PathPoint P2: pelvis (-0.1178728 -0.03542425 0.08499436)
      PathPoint P3: femur_r (-0.01501532 -0.003652375 0.04433578)
    Millard2012EquilibriumMuscle psoas_r: max_isometric_force=1426.79 optimal_fiber_length=0.1323525
        tendon_slack_length=0.1127013 pennation_angle_at_optimal=0.2155251
      PathPoint P1: pelvis (-0.07001661 0.07163416 0.05441201)
      PathPoint P2: pelvis (-0.02368549 -0.07556248 0.0915238)
      PathPoint P3: femur_r (-0.01339204 -0.04737942 0.004666924)
      PathPoint P4: femur_r (-0.02384189 -0.05316235 0.008928028)
      PathWrap: wrap_object=PS_at_brim_r method=hybrid range=(2 3)
    Millard2012EquilibriumMuscle recfem_r: max_isometric_force=2191.741 optimal_fiber_length=0.07743988
        tendon_slack_length=0.459541 pennation_angle_at_optimal=0.2170149
      PathPoint P1: pelvis (-0.02772935 -0.04482912 0.1301703)
      PathPoint P2: patella_r (0.01014549 0.04971288 0.0007101841)
      PathPoint P3: patella_r (0.01227604 0.04433578 -0.001014549)
      PathPoint P4: patella_r (0.005072743 0.002505935 3.043646e-5)
      PathPoint P5: tibia_r (0.03118813 -0.06038634 -0.0004496448)
      PathWrap: wrap_object=KnExt_at_fem_r method=hybrid
    Millard2012EquilibriumMuscle sart_r: max_isometric_force=249.4131 optimal_fiber_length=0.4123333
        tendon_slack_length=0.1268716 pennation_angle_at_optimal=0.02613542
      PathPoint P1: pelvis (-0.0225301 -0.01802408 0.147331)
      PathPoint P2: femur_r (-0.003043646 -0.361991 -0.0427125)
      PathPoint P3: tibia_r (-0.02401295 -0.03836331 -0.03491922)
      PathPoint P4: tibia_r (-0.01521139 -0.0573058 -0.02525664)
      PathPoint P5: tibia_r (0.013011 -0.07749198 -0.002487397)
    Millard2012EquilibriumMuscle semimem_r: max_isometric_force=2200.987 optimal_fiber_length=0.08580402
        tendon_slack_length=0.3342366 pennation_angle_at_optimal=0.2545615
      PathPoint P1: pelvis (-0.114037 -0.1317144 0.08566404)
      PathPoint P2: tibia_r (-0.02583066 -0.03922433 -0.01875115)
      PathWrap: wrap_object=SM_at_condyles_r method=hybrid
    Millard2012EquilibriumMuscle semiten_r: max_isometric_force=591.2951 optimal_fiber_length=0.1909666
        tendon_slack_length=0.2445945 pennation_angle_at_optimal=0.241295
      PathPoint P1: pelvis (-0.1199294 -0.1447703 0.07185176)
      PathPoint P2: tibia_r (-0.02984876 -0.04859991 -0.02190823)
      PathPoint P3: tibia_r (0.001817713 -0.07395222 -0.01119329)
      PathWrap: wrap_object=ST_at_condyles_r method=hybrid
    Millard2012EquilibriumMuscle soleus_r: max_isometric_force=6194.843 optimal_fiber_length=0.04177887
        tendon_slack_length=0.2671474 pennation_angle_at_optimal=0.3814289
      PathPoint P1: tibia_r (-0.007270852 -0.0876329 0.009375573)
      PathPoint P2: calcn_r (0.003602983 0.02538465 -0.004339957)
    Millard2012EquilibriumMuscle tfl_r: max_isometric_force=411.2066 optimal_fiber_length=0.09635556
        tendon_slack_length=0.4559175 pennation_angle_at_optimal=0.05235988
      PathPoint P1: pelvis (-0.02310779 0.01270929 0.1799782)
      PathPoint P2: femur_r (0.02982773 -0.1009476 0.06056855)
      PathPoint P3: femur_r (0.01085567 -0.4108922 0.03287138)
      PathPoint P4: tibia_r (0.01033226 -0.03922433 0.03310151)
    Millard2012EquilibriumMuscle tibant_r: max_isometric_force=1227.452 optimal_fiber_length=0.06364491
        tendon_slack_length=0.224072 pennation_angle_at_optimal=0.1951828
      PathPoint P1: tibia_r (0.01473304 -0.1255179 0.0154984)
      PathPoint P2: tibia_r (0.02401295 -0.1823453 0.01224565)
      PathPoint P3: tibia_r (0.0222909 -0.3500533 -0.01262832)
      PathPoint P4: calcn_r (0.09547904 0.0145757 -0.02497522)
    Millard2012EquilibriumMuscle tibpost_r: max_isometric_force=1730.154 optimal_fiber_length=0.03536517
        tendon_slack_length=0.2626936 pennation_angle_at_optimal=0.2264891
      PathPoint P1: tibia_r (-0.003922433 -0.1247525 0.009853918)
      PathPoint P2: tibia_r (-0.01568973 -0.3496706 -0.01674209)
      PathPoint P3: calcn_r (0.03414645 0.02734991 -0.02341939)
      PathPoint P4: calcn_r (0.06321597 0.01301987 -0.02300996)
    Millard2012EquilibriumMuscle vasint_r: max_isometric_force=1697.361 optimal_fiber_length=0.117588
        tendon_slack_length=0.2060303 pennation_angle_at_optimal=0.06309973
      PathPoint P1: femur_r (0.02942191 -0.1951992 0.03145101)
      PathPoint P2: femur_r (0.03398738 -0.2114319 0.02891464)
      PathPoint P3: patella_r (0.005884382 0.04869834 -0.0006087292)
      PathPoint P4: patella_r (0.005072743 0.002505935 -0.000395674)
      PathPoint P5: tibia_r (0.03115943 -0.06046288 0.0004113772)
      PathWrap: wrap_object=KnExt_at_fem_r method=hybrid
    Millard2012EquilibriumMuscle vaslat_r: max_isometric_force=5148.767 optimal_fiber_length=0.1176436
        tendon_slack_length=0.2222157 pennation_angle_at_optimal=0.2528673
      PathPoint P1: femur_r (0.004869834 -0.1880973 0.03540775)
      PathPoint P2: femur_r (0.02729136 -0.2628696 0.04149504)
      PathPoint P3: patella_r (0.01044985 0.04291541 0.01430514)
      PathPoint P4: patella_r (0.005072743 0.002505935 0.007436642)
      PathPoint P5: tibia_r (0.03113073 -0.06063508 0.004888691)
      PathWrap: wrap_object=KnExtVL_at_fem_r method=hybrid
    Millard2012EquilibriumMuscle vasmed_r: max_isometric_force=2747.823 optimal_fiber_length=0.1105114
        tendon_slack_length=0.208967 pennation_angle_at_optimal=0.4222225
      PathPoint P1: femur_r (0.01420368 -0.2129538 0.01907351)
      PathPoint P2: femur_r (0.03611793 -0.2809285 0.0009130938)
      PathPoint P3: patella_r (0.006391656 0.04514741 -0.01724733)
      PathPoint P4: patella_r (0.005072743 0.002505935 -0.008623664)
      PathPoint P5: tibia_r (0.03051845 -0.06081685 -0.006486365)
      PathWrap: wrap_object=KnExt_at_fem_r method=hybrid
    Millard2012EquilibriumMuscle addbrev_l: max_isometric_force=625.8197 optimal_fiber_length=0.1163129
        tendon_slack_length=0.03999345 pennation_angle_at_optimal=0.1147809
      PathPoint P1: pelvis (-0.02206794 -0.1086066 -0.02148577)
      PathPoint P2: femur_l (-0.002036722 -0.1201666 -0.02535719)
      PathWrap: wrap_object=AB_at_femshaft_l method=hybrid
    Millard2012EquilibriumMuscle addlong_l: max_isometric_force=916.8 optimal_fiber_length=0.1134324
        tendon_slack_length=0.138173 pennation_angle_at_optimal=0.1377704
      PathPoint P1: pelvis (-0.008757853 -0.1027141 -0.026341)
      PathPoint P2: femur_l (0.01146674 -0.243765 -0.01612065)
      PathWrap: wrap_object=AL_at_femshaft_l method=hybrid
    Millard2012EquilibriumMuscle addmagDist_l: max_isometric_force=597.2951 optimal_fiber_length=0.1788249
        tendon_slack_length=0.08818198 pennation_angle_at_optimal=0.194705
      PathPoint P1: pelvis (-0.08554505 -0.1475086 -0.05555606)
      PathPoint P2: femur_l (0.01145656 -0.2673197 -0.01965437)
      PathWrap: wrap_object=AMdist_at_femshaft_l method=hybrid
    Millard2012EquilibriumMuscle addmagIsch_l: max_isometric_force=597.2951 optimal_fiber_length=0.1562106
        tendon_slack_length=0.2163578 pennation_angle_at_optimal=0.1680443
      PathPoint P1: pelvis (-0.103546 -0.1499234 -0.05819295)
      PathPoint P2: femur_l (0.004898316 -0.3950935 0.03333095)
      PathWrap: wrap_object=AMisch_at_condyles_l method=hybrid
    Millard2012EquilibriumMuscle addmagMid_l: max_isometric_force=597.2951 optimal_fiber_length=0.1462014
        tendon_slack_length=0.04950644 pennation_angle_at_optimal=0.2073076
      PathPoint P1: pelvis (-0.06084282 -0.1395133 -0.03981843)
      PathPoint P2: femur_l (0.002464433 -0.1653818 -0.02975651)
      PathWrap: wrap_object=AMmid_at_femshaft_l method=hybrid
    Millard2012EquilibriumMuscle addmagProx_l: max_isometric_force=597.2951 optimal_fiber_length=0.1256015
        tendon_slack_length=0.0479618 pennation_angle_at_optimal=0.3114833
      PathPoint P1: pelvis (-0.03579397 -0.1242622 -0.0190442)
      PathPoint P2: femur_l (-0.01555037 -0.08030794 -0.03260792)
      PathWrap: wrap_object=AMprox_at_femshaft_l method=hybrid
    Millard2012EquilibriumMuscle bflh_l: max_isometric_force=1313.184 optimal_fiber_length=0.09749361
        tendon_slack_length=0.3321364 pennation_angle_at_optimal=0.1759182
      PathPoint P1: pelvis (-0.1201605 -0.1376069 -0.08175754)
      PathPoint P2: tibia_l (-0.03232688 -0.03432144 -0.03403919)
      PathPoint P3: tibia_l (-0.02544001 -0.04711671 -0.03270321)
    Millard2012EquilibriumMuscle bfsh_l: max_isometric_force=557.1148 optimal_fiber_length=0.1111087
        tendon_slack_length=0.1065931 pennation_angle_at_optimal=0.2642232
      PathPoint P1: femur_l (0.005091804 -0.214976 -0.02382964)
      PathPoint P2: tibia_l (-0.02696416 -0.03089682 -0.03014416)
      PathWrap: wrap_object=BF_at_gastroc_l method=hybrid
    Millard2012EquilibriumMuscle edl_l: max_isometric_force=603.4982 optimal_fiber_length=0.0620444
        tendon_slack_length=0.3302546 pennation_angle_at_optimal=0.2182582
      PathPoint P1: tibia_l (-0.01505326 -0.1088539 -0.01928699)
      PathPoint P2: tibia_l (0.01542959 -0.3537517 -0.01053728)
      PathPoint P3: calcn_l (0.07525321 0.02947895 -0.0006550878)
      PathPoint P4: calcn_l (0.1323277 0.004503729 -0.01064518)
      PathPoint P5: toes_l (0.0002456579 0.003848641 -0.01252855)
      PathPoint P6: toes_l (0.03627549 -0.0003275439 -0.02047149)
    Millard2012EquilibriumMuscle ehl_l: max_isometric_force=285.8675 optimal_fiber_length=0.06652697
        tendon_slack_length=0.2906511 pennation_angle_at_optimal=0.1972681
      PathPoint P1: tibia_l (-0.0131716 -0.1458285 -0.01778167)
      PathPoint P2: tibia_l (0.006679885 -0.2736871 -0.01542959)
      PathPoint P3: tibia_l (0.01881658 -0.3474481 0.002634321)
      PathPoint P4: calcn_l (0.07942939 0.03185364 0.01727794)
      PathPoint P5: calcn_l (0.1058786 0.02530277 0.0210447)
      PathPoint P6: calcn_l (0.1419903 0.01138215 0.02292807)
      PathPoint P7: toes_l (0.02440202 0.003357325 0.02006206)
      PathPoint P8: toes_l (0.0461018 0.002784123 0.01523079)
    Millard2012EquilibriumMuscle fdl_l: max_isometric_force=423.177 optimal_fiber_length=0.0392938
        tendon_slack_length=0.3337091 pennation_angle_at_optimal=0.2248391
      PathPoint P1: tibia_l (-0.002163906 -0.1723598 0.001693492)
      PathPoint P2: tibia_l (-0.01655859 -0.3429321 0.01166628)
      PathPoint P3: calcn_l (0.03570228 0.02579408 0.02292807)
      PathPoint P4: calcn_l (0.05797527 0.01441193 0.02153601)
      PathPoint P5: calcn_l (0.1357669 -0.006632764 -0.009498773)
      PathPoint P6: toes_l (-0.001555833 -0.006387106 -0.01203724)
      PathPoint P7: toes_l (0.0233375 -0.005813904 -0.01760548)
      PathPoint P8: toes_l (0.03611171 -0.004913158 -0.01981641)
    Millard2012EquilibriumMuscle fhl_l: max_isometric_force=907.8393 optimal_fiber_length=0.04610339
        tendon_slack_length=0.309986 pennation_angle_at_optimal=0.2580255
      PathPoint P1: tibia_l (-0.0291657 -0.2035013 -0.01881658)
      PathPoint P2: tibia_l (-0.02276806 -0.3453783 0.007150299)
      PathPoint P3: calcn_l (0.03062535 0.02260053 0.01973452)
      PathPoint P4: calcn_l (0.08499764 0.005568246 0.02096281)
      PathPoint P5: calcn_l (0.1413352 -0.004339957 0.02202733)
      PathPoint P6: toes_l (0.01269233 -0.005240702 0.02169978)
      PathPoint P7: toes_l (0.04601992 -0.008352369 0.01482136)
    Millard2012EquilibriumMuscle gaslat_l: max_isometric_force=1575.059 optimal_fiber_length=0.06494965
        tendon_slack_length=0.3520459 pennation_angle_at_optimal=0.2102268
      PathPoint P1: femur_l (0.002036722 -0.3879955 -0.02096805)
      PathPoint P2: calcn_l (0.003602983 0.02538465 0.004339957)
      PathWrap: wrap_object=GasLat_at_shank_l method=hybrid
      PathWrap pathwrap_0: wrap_object=GasLat_at_condyles_l method=hybrid
    Millard2012EquilibriumMuscle gasmed_l: max_isometric_force=3115.515 optimal_fiber_length=0.05557855
        tendon_slack_length=0.3645576 pennation_angle_at_optimal=0.1656816
      PathPoint P1: femur_l (0.006110165 -0.3920689 0.02240394)
      PathPoint P2: calcn_l (0.003602983 0.02538465 0.004339957)
      PathWrap: wrap_object=GasMed_at_shank_l method=hybrid
      PathWrap pathwrap_0: wrap_object=GasMed_at_condyles_l method=hybrid
    Millard2012EquilibriumMuscle glmax1_l: max_isometric_force=983.7836 optimal_fiber_length=0.1650808
        tendon_slack_length=0.09803778 pennation_angle_at_optimal=0.3540118
      PathPoint P1: pelvis (-0.1422285 0.03986094 -0.07854862)
      PathPoint P2: pelvis (-0.1452325 -0.02796043 -0.1086845)
      PathPoint P3: femur_l (-0.04521522 -0.03319857 -0.0307545)
      PathPoint P4: femur_l (-0.0282086 -0.05763923 -0.04786296)
      PathWrap: wrap_object=Gmax1_at_pelvis_l method=hybrid
    Millard2012EquilibriumMuscle glmax2_l: max_isometric_force=1406.046 optimal_fiber_length=0.1750901
        tendon_slack_length=0.1215593 pennation_angle_at_optimal=0.3673821
      PathPoint P1: pelvis (-0.1521648 0.01005189 -0.06445731)
      PathPoint P2: pelvis (-0.1552844 -0.07036323 -0.1134281)
      PathPoint P3: femur_l (-0.04582624 -0.05947228 -0.02566269)
      PathPoint P4: femur_l (-0.01588643 -0.1034655 -0.04266932)
      PathWrap: wrap_object=Gmax2_at_pelvis_l method=hybrid
    Millard2012EquilibriumMuscle glmax3_l: max_isometric_force=947.7541 optimal_fiber_length=0.1871702
        tendon_slack_length=0.1154403 pennation_angle_at_optimal=0.3824161
      PathPoint P1: pelvis (-0.1502007 -0.06065795 -0.01255662)
      PathPoint P2: pelvis (-0.1470811 -0.1459257 -0.06069032)
      PathPoint P3: femur_l (-0.02861594 -0.1145656 -0.009572592)
      PathPoint P4: femur_l (-0.006110165 -0.1445054 -0.04185463)
      PathWrap: wrap_object=Gmax3_at_pelvis_l method=hybrid
    Millard2012EquilibriumMuscle glmed1_l: max_isometric_force=1093.467 optimal_fiber_length=0.08557294
        tendon_slack_length=0.06543813 pennation_angle_at_optimal=0.3165559
      PathPoint P1: pelvis (-0.05661409 0.03004013 -0.1604457)
      PathPoint P2: femur_l (-0.01425705 -0.0183305 -0.06008329)
    Millard2012EquilibriumMuscle glmed2_l: max_isometric_force=765.0917 optimal_fiber_length=0.09489969
        tendon_slack_length=0.08524026 pennation_angle_at_optimal=0.3165559
      PathPoint P1: pelvis (-0.09820812 0.06354643 -0.1144047)
      PathPoint P2: femur_l (-0.02240394 -0.01018361 -0.05702821)
    Millard2012EquilibriumMuscle glmed3_l: max_isometric_force=871.1993 optimal_fiber_length=0.08885417
        tendon_slack_length=0.05506456 pennation_angle_at_optimal=0.3165559
      PathPoint P1: pelvis (-0.115539 0.01848623 -0.08929151)
      PathPoint P2: femur_l (-0.03146735 -0.004786296 -0.05275109)
    Millard2012EquilibriumMuscle glmin1_l: max_isometric_force=374.0459 optimal_fiber_length=0.09121962
        tendon_slack_length=0.02165484 pennation_angle_at_optimal=0.1745329
      PathPoint P1: pelvis (-0.03466169 0 -0.1646312)
      PathPoint P2: femur_l (0.005091804 -0.01527541 -0.05702821)
    Millard2012EquilibriumMuscle glmin2_l: max_isometric_force=394.8197 optimal_fiber_length=0.07657733
        tendon_slack_length=0.0356915 pennation_angle_at_optimal=0
      PathPoint P1: pelvis (-0.071172 0.0115539 -0.1409132)
      PathPoint P2: femur_l (0.004073444 -0.009165248 -0.05295477)
    Millard2012EquilibriumMuscle glmin3_l: max_isometric_force=446.7738 optimal_fiber_length=0.03896877
        tendon_slack_length=0.05210555 pennation_angle_at_optimal=0.01745329
      PathPoint P1: pelvis (-0.09116024 -0.01790854 -0.1113354)
      PathPoint P2: femur_l (-0.004073444 -0.001018361 -0.05193641)
    Millard2012EquilibriumMuscle grac_l: max_isometric_force=281.3115 optimal_fiber_length=0.2260545
        tendon_slack_length=0.1706958 pennation_angle_at_optimal=0.1720016
      PathPoint P1: pelvis (-0.05471925 -0.149415 -0.03426562)
      PathPoint P2: tibia_l (-0.01733007 -0.04473641 0.02785794)
      PathPoint P3: tibia_l (0.001674675 -0.06550051 0.01479924)
      PathWrap: wrap_object=GR_at_condyles_l method=hybrid
    Millard2012EquilibriumMuscle iliacus_l: max_isometric_force=1021.141 optimal_fiber_length=0.1196625
        tendon_slack_length=0.1078991 pennation_angle_at_optimal=0.279914
      PathPoint P1: pelvis (-0.06990107 0.03570154 -0.1176137)
      PathPoint P2: pelvis (-0.01559776 -0.0643552 -0.1054756)
      PathPoint P3: femur_l (-0.00234223 -0.05753739 -0.01415522)
      PathPoint P4: femur_l (-0.012424 -0.06486959 -0.01995987)
      PathWrap: wrap_object=IL_at_brim_l method=hybrid range=(2 3)
    Millard2012EquilibriumMuscle perbrev_l: max_isometric_force=521.2016 optimal_fiber_length=0.04166599
        tendon_slack_length=0.1353938 pennation_angle_at_optimal=0.2052361
      PathPoint P1: tibia_l (-0.02286214 -0.2382179 -0.0236148)
      PathPoint P2: tibia_l (-0.0318941 -0.3662647 -0.02342664)
      PathPoint P3: tibia_l (-0.02681362 -0.3767079 -0.02399114)
      PathPoint P4: calcn_l (0.03856829 0.02210921 -0.01907943)
      PathPoint P5: calcn_l (0.0554368 0.01793303 -0.02808689)
    Millard2012EquilibriumMuscle perlong_l: max_isometric_force=1115.371 optimal_fiber_length=0.04593249
        tendon_slack_length=0.3003883 pennation_angle_at_optimal=0.2479525
      PathPoint P1: tibia_l (-0.01881658 -0.1291758 -0.02653137)
      PathPoint P2: tibia_l (-0.02982428 -0.3669233 -0.02229764)
      PathPoint P3: tibia_l (-0.02559055 -0.3776487 -0.02257989)
      PathPoint P4: calcn_l (0.03586606 0.01883377 -0.0180968)
      PathPoint P5: calcn_l (0.05576435 0.008679913 -0.02325562)
      PathPoint P6: calcn_l (0.06976685 0.005650132 -0.009662545)
      PathPoint P7: calcn_l (0.09850883 0.006960308 0.01506702)
    Millard2012EquilibriumMuscle piri_l: max_isometric_force=1029.787 optimal_fiber_length=0.03179725
        tendon_slack_length=0.140527 pennation_angle_at_optimal=0.1745329
      PathPoint P1: pelvis (-0.1176302 -0.007544694 -0.01884888)
      PathPoint P2: pelvis (-0.1178728 -0.03542425 -0.08499436)
      PathPoint P3: femur_l (-0.01507174 -0.003666099 -0.04450237)
    Millard2012EquilibriumMuscle psoas_l: max_isometric_force=1426.79 optimal_fiber_length=0.1324549
        tendon_slack_length=0.1127886 pennation_angle_at_optimal=0.2155251
      PathPoint P1: pelvis (-0.07001661 0.07163416 -0.05441201)
      PathPoint P2: pelvis (-0.02368549 -0.07556248 -0.0915238)
      PathPoint P3: femur_l (-0.01344236 -0.04755745 -0.00468446)
      PathPoint P4: femur_l (-0.02393148 -0.05336211 -0.008961576)
      PathWrap: wrap_object=PS_at_brim_l method=hybrid range=(2 3)
    Millard2012EquilibriumMuscle recfem_l: max_isometric_force=2191.741 optimal_fiber_length=0.07757866
        tendon_slack_length=0.4603635 pennation_angle_at_optimal=0.2170149
      PathPoint P1: pelvis (-0.02772935 -0.04482912 -0.1301703)
      PathPoint P2: patella_l (0.01018361 0.04989968 -0.0007128526)
      PathPoint P3: patella_l (0.01232217 0.04450237 0.001018361)
      PathPoint P4: patella_l (0.005091804 0.002515351 -3.055083e-5)
      PathPoint P5: tibia_l (0.03067102 -0.05938512 0.0004421896)
      PathWrap: wrap_object=KnExt_at_fem_l method=hybrid
    Millard2012EquilibriumMuscle sart_l: max_isometric_force=249.4131 optimal_fiber_length=0.4122852
        tendon_slack_length=0.1268568 pennation_angle_at_optimal=0.02613542
      PathPoint P1: pelvis (-0.0225301 -0.01802408 -0.147331)
      PathPoint P2: femur_l (-0.003055083 -0.3633512 0.04287299)
      PathPoint P3: tibia_l (-0.0236148 -0.03772724 0.03434025)
      PathPoint P4: tibia_l (-0.01495918 -0.05635565 0.02483788)
      PathPoint P5: tibia_l (0.01279527 -0.07620714 0.002446155)
    Millard2012EquilibriumMuscle semimem_l: max_isometric_force=2200.987 optimal_fiber_length=0.08600514
        tendon_slack_length=0.33502 pennation_angle_at_optimal=0.2545615
      PathPoint P1: pelvis (-0.114037 -0.1317144 -0.08566404)
      PathPoint P2: tibia_l (-0.02540238 -0.03857398 0.01844025)
      PathWrap: wrap_object=SM_at_condyles_l method=hybrid
    Millard2012EquilibriumMuscle semiten_l: max_isometric_force=591.2951 optimal_fiber_length=0.1910187
        tendon_slack_length=0.2446612 pennation_angle_at_optimal=0.241295
      PathPoint P1: pelvis (-0.1199294 -0.1447703 -0.07185176)
      PathPoint P2: tibia_l (-0.02935386 -0.04779411 0.02154498)
      PathPoint P3: tibia_l (0.001787575 -0.07272607 0.0110077)
      PathWrap: wrap_object=ST_at_condyles_l method=hybrid
    Millard2012EquilibriumMuscle soleus_l: max_isometric_force=6194.843 optimal_fiber_length=0.04111657
        tendon_slack_length=0.2629124 pennation_angle_at_optimal=0.3814289
      PathPoint P1: tibia_l (-0.007150299 -0.08617992 -0.009220123)
      PathPoint P2: calcn_l (0.003602983 0.02538465 0.004339957)
    Millard2012EquilibriumMuscle tfl_l: max_isometric_force=411.2066 optimal_fiber_length=0.09651825
        tendon_slack_length=0.4566872 pennation_angle_at_optimal=0.05235988
      PathPoint P1: pelvis (-0.02310779 0.01270929 -0.1799782)
      PathPoint P2: femur_l (0.02993981 -0.1013269 -0.06079615)
      PathPoint P3: femur_l (0.01089646 -0.4124362 -0.03299489)
      PathPoint P4: tibia_l (0.01016095 -0.03857398 -0.03255268)
    Millard2012EquilibriumMuscle tibant_l: max_isometric_force=1227.452 optimal_fiber_length=0.06274831
        tendon_slack_length=0.2209154 pennation_angle_at_optimal=0.1951828
      PathPoint P1: tibia_l (0.01448876 -0.1234367 -0.01524143)
      PathPoint P2: tibia_l (0.0236148 -0.179322 -0.01204261)
      PathPoint P3: tibia_l (0.02192131 -0.3442493 0.01241894)
      PathPoint P4: calcn_l (0.09547904 0.0145757 0.02497522)
    Millard2012EquilibriumMuscle tibpost_l: max_isometric_force=1730.154 optimal_fiber_length=0.03485624
        tendon_slack_length=0.2589133 pennation_angle_at_optimal=0.2264891
      PathPoint P1: tibia_l (-0.003857398 -0.1226841 -0.009690537)
      PathPoint P2: tibia_l (-0.01542959 -0.343873 0.01646451)
      PathPoint P3: calcn_l (0.03414645 0.02734991 0.02341939)
      PathPoint P4: calcn_l (0.06321597 0.01301987 0.02300996)
    Millard2012EquilibriumMuscle vasint_l: max_isometric_force=1697.361 optimal_fiber_length=0.1176735
        tendon_slack_length=0.20618 pennation_angle_at_optimal=0.06309973
      PathPoint P1: femur_l (0.02953247 -0.1959326 -0.03156919)
      PathPoint P2: femur_l (0.03411509 -0.2122264 -0.02902329)
      PathPoint P3: patella_l (0.005906493 0.04888132 0.0006110165)
      PathPoint P4: patella_l (0.005091804 0.002515351 0.0003971607)
      PathPoint P5: tibia_l (0.0306428 -0.05946038 -0.0004045564)
      PathWrap: wrap_object=KnExt_at_fem_l method=hybrid
    Millard2012EquilibriumMuscle vaslat_l: max_isometric_force=5148.767 optimal_fiber_length=0.1177475
        tendon_slack_length=0.2224119 pennation_angle_at_optimal=0.2528673
      PathPoint P1: femur_l (0.004888132 -0.1888041 -0.0355408)
      PathPoint P2: femur_l (0.02739391 -0.2638573 -0.04165096)
      PathPoint P3: patella_l (0.01048912 0.04307667 -0.01435889)
      PathPoint P4: patella_l (0.005091804 0.002515351 -0.007464585)
      PathPoint P5: tibia_l (0.03061457 -0.05962973 -0.004807636)
      PathWrap: wrap_object=KnExtVL_at_fem_l method=hybrid
    Millard2012EquilibriumMuscle vasmed_l: max_isometric_force=2747.823 optimal_fiber_length=0.1105784
        tendon_slack_length=0.2090937 pennation_angle_at_optimal=0.4222225
      PathPoint P1: femur_l (0.01425705 -0.213754 -0.01914518)
      PathPoint P2: femur_l (0.03625365 -0.2819841 -0.0009165248)
      PathPoint P3: patella_l (0.006415674 0.04531706 0.01731214)
      PathPoint P4: patella_l (0.005091804 0.002515351 0.008656068)
      PathPoint P5: tibia_l (0.03001244 -0.05980849 0.00637882)
      PathWrap: wrap_object=KnExt_at_fem_l method=hybrid
    CoordinateActuator lumbar_ext: coordinate=lumbar_extension optimal_force=10
    CoordinateActuator lumbar_bend: coordinate=lumbar_bending optimal_force=10
    CoordinateActuator lumbar_rot: coordinate=lumbar_rotation optimal_force=10
    CoordinateActuator shoulder_flex_r: coordinate=arm_flex_r optimal_force=10
    CoordinateActuator shoulder_add_r: coordinate=arm_add_r optimal_force=10
    CoordinateActuator shoulder_rot_r: coordinate=arm_rot_r optimal_force=10
    CoordinateActuator elbow_flex_r: coordinate=elbow_flex_r optimal_force=10
    CoordinateActuator pro_sup_r: coordinate=pro_sup_r optimal_force=10
    CoordinateActuator shoulder_flex_l: coordinate=arm_flex_l optimal_force=10
    CoordinateActuator shoulder_add_l: coordinate=arm_add_l optimal_force=10
    CoordinateActuator shoulder_rot_l: coordinate=arm_rot_l optimal_force=10
    CoordinateActuator elbow_flex_l: coordinate=elbow_flex_l optimal_force=10
    CoordinateActuator pro_sup_l: coordinate=pro_sup_l optimal_force=10
    HuntCrossleyForce ForceGround_Foot_1_R_A: transition_velocity=0.13
      ContactParametersSet contact_parameters:
        ContactParameters: geometry=(ground_Foot_R_A Sphere_Foot_1_R) stiffness=10000000 dissipation=0
            static_friction=0 dynamic_friction=0 viscous_friction=0
    HuntCrossleyForce ForceGround_Foot_1_R_B: transition_velocity=0.13
      ContactParametersSet contact_parameters:
        ContactParameters: geometry=(ground_Foot_R_B Sphere_Foot_1_R) stiffness=10000000 dissipation=0
            static_friction=0 dynamic_friction=0 viscous_friction=0
    HuntCrossleyForce ForceGround_Foot_1_L_A: transition_velocity=0.13
      ContactParametersSet contact_parameters:
        ContactParameters: geometry=(ground_Foot_L_A Sphere_Foot_1_L) stiffness=10000000 dissipation=0
            static_friction=0 dynamic_friction=0 viscous_friction=0
    HuntCrossleyForce ForceGround_Foot_1_L_B: transition_velocity=0.13
      ContactParametersSet contact_parameters:
        ContactParameters: geometry=(ground_Foot_L_B Sphere_Foot_1_L) stiffness=10000000 dissipation=0
            static_friction=0 dynamic_friction=0 viscous_friction=0
    HuntCrossleyForce ForceGround_Foot_2_R_A: transition_velocity=0.13
      ContactParametersSet contact_parameters:
        ContactParameters: geometry=(ground_Foot_R_A Sphere_Foot_2_R) stiffness=10000000 dissipation=0
            static_friction=0 dynamic_friction=0 viscous_friction=0
    HuntCrossleyForce ForceGround_Foot_2_R_B: transition_velocity=0.13
      ContactParametersSet contact_parameters:
        ContactParameters: geometry=(ground_Foot_R_B Sphere_Foot_2_R) stiffness=10000000 dissipation=0
            static_friction=0 dynamic_friction=0 viscous_friction=0
    HuntCrossleyForce ForceGround_Foot_2_L_A: transition_velocity=0.13
      ContactParametersSet contact_parameters:
        ContactParameters: geometry=(ground_Foot_L_A Sphere_Foot_2_L) stiffness=10000000 dissipation=0
            static_friction=0 dynamic_friction=0 viscous_friction=0
    HuntCrossleyForce ForceGround_Foot_2_L_B: transition_velocity=0.13
      ContactParametersSet contact_parameters:
        ContactParameters: geometry=(ground_Foot_L_B Sphere_Foot_2_L) stiffness=10000000 dissipation=0
            static_friction=0 dynamic_friction=0 viscous_friction=0
    HuntCrossleyForce ForceGround_Foot_3_R_A: transition_velocity=0.13
      ContactParametersSet contact_parameters:
        ContactParameters: geometry=(ground_Foot_R_A Sphere_Foot_3_R) stiffness=10000000 dissipation=0
            static_friction=0 dynamic_friction=0 viscous_friction=0
    HuntCrossleyForce ForceGround_Foot_3_R_B: transition_velocity=0.13
      ContactParametersSet contact_parameters:
        ContactParameters: geometry=(ground_Foot_R_B Sphere_Foot_3_R) stiffness=10000000 dissipation=0
            static_friction=0 dynamic_friction=0 viscous_friction=0
    HuntCrossleyForce ForceGround_Foot_3_L_A: transition_velocity=0.13
      ContactParametersSet contact_parameters:
        ContactParameters: geometry=(ground_Foot_L_A Sphere_Foot_3_L) stiffness=10000000 dissipation=0
            static_friction=0 dynamic_friction=0 viscous_friction=0
    HuntCrossleyForce ForceGround_Foot_3_L_B: transition_velocity=0.13
      ContactParametersSet contact_parameters:
        ContactParameters: geometry=(ground_Foot_L_B Sphere_Foot_3_L) stiffness=10000000 dissipation=0
            static_friction=0 dynamic_friction=0 viscous_friction=0
    HuntCrossleyForce ForceGround_Foot_4_R_A: transition_velocity=0.13
      ContactParametersSet contact_parameters:
        ContactParameters: geometry=(ground_Foot_R_A Sphere_Foot_4_R) stiffness=10000000 dissipation=0
            static_friction=0 dynamic_friction=0 viscous_friction=0
    HuntCrossleyForce ForceGround_Foot_4_R_B: transition_velocity=0.13
      ContactParametersSet contact_parameters:
        ContactParameters: geometry=(ground_Foot_R_B Sphere_Foot_4_R) stiffness=10000000 dissipation=0
            static_friction=0 dynamic_friction=0 viscous_friction=0
    HuntCrossleyForce ForceGround_Foot_4_L_A: transition_velocity=0.13
      ContactParametersSet contact_parameters:
        ContactParameters: geometry=(ground_Foot_L_A Sphere_Foot_4_L) stiffness=10000000 dissipation=0
            static_friction=0 dynamic_friction=0 viscous_friction=0
    HuntCrossleyForce ForceGround_Foot_4_L_B: transition_velocity=0.13
      ContactParametersSet contact_parameters:
        ContactParameters: geometry=(ground_Foot_L_B Sphere_Foot_4_L) stiffness=10000000 dissipation=0
            static_friction=0 dynamic_friction=0 viscous_friction=0
    HuntCrossleyForce ForceGround_Foot_5_R_A: transition_velocity=0.13
      ContactParametersSet contact_parameters:
        ContactParameters: geometry=(ground_Foot_R_A Sphere_Foot_5_R) stiffness=10000000 dissipation=0
            static_friction=0 dynamic_friction=0 viscous_friction=0
    HuntCrossleyForce ForceGround_Foot_5_R_B: transition_velocity=0.13
      ContactParametersSet contact_parameters:
        ContactParameters: geometry=(ground_Foot_R_B Sphere_Foot_5_R) stiffness=10000000 dissipation=0
            static_friction=0 dynamic_friction=0 viscous_friction=0
    HuntCrossleyForce ForceGround_Foot_5_L_A: transition_velocity=0.13
      ContactParametersSet contact_parameters:
        ContactParameters: geometry=(ground_Foot_L_A Sphere_Foot_5_L) stiffness=10000000 dissipation=0
            static_friction=0 dynamic_friction=0 viscous_friction=0
    HuntCrossleyForce ForceGround_Foot_5_L_B: transition_velocity=0.13
      ContactParametersSet contact_parameters:
        ContactParameters: geometry=(ground_Foot_L_B Sphere_Foot_5_L) stiffness=10000000 dissipation=0
            static_friction=0 dynamic_friction=0 viscous_friction=0
    HuntCrossleyForce ForceGround_Foot_6_R_A: transition_velocity=0.13
      ContactParametersSet contact_parameters:
        ContactParameters: geometry=(ground_Foot_R_A Sphere_Foot_6_R) stiffness=10000000 dissipation=0
            static_friction=0 dynamic_friction=0 viscous_friction=0
    HuntCrossleyForce ForceGround_Foot_6_R_B: transition_velocity=0.13
      ContactParametersSet contact_parameters:
        ContactParameters: geometry=(ground_Foot_R_B Sphere_Foot_6_R) stiffness=10000000 dissipation=0
            static_friction=0 dynamic_friction=0 viscous_friction=0
    HuntCrossleyForce ForceGround_Foot_6_L_A: transition_velocity=0.13
      ContactParametersSet contact_parameters:
        ContactParameters: geometry=(ground_Foot_L_A Sphere_Foot_6_L) stiffness=10000000 dissipation=0
            static_friction=0 dynamic_friction=0 viscous_friction=0
    HuntCrossleyForce ForceGround_Foot_6_L_B: transition_velocity=0.13
      ContactParametersSet contact_parameters:
        ContactParameters: geometry=(ground_Foot_L_B Sphere_Foot_6_L) stiffness=10000000 dissipation=0
            static_friction=0 dynamic_friction=0 viscous_friction=0
    HuntCrossleyForce ForceGround_Foot_7_R_A: transition_velocity=0.13
      ContactParametersSet contact_parameters:
        ContactParameters: geometry=(ground_Foot_R_A Sphere_Foot_7_R) stiffness=10000000 dissipation=0
            static_friction=0 dynamic_friction=0 viscous_friction=0
    HuntCrossleyForce ForceGround_Foot_7_R_B: transition_velocity=0.13
      ContactParametersSet contact_parameters:
        ContactParameters: geometry=(ground_Foot_R_B Sphere_Foot_7_R) stiffness=10000000 dissipation=0
            static_friction=0 dynamic_friction=0 viscous_friction=0
    HuntCrossleyForce ForceGround_Foot_7_L_A: transition_velocity=0.13
      ContactParametersSet contact_parameters:
        ContactParameters: geometry=(ground_Foot_L_A Sphere_Foot_7_L) stiffness=10000000 dissipation=0
            static_friction=0 dynamic_friction=0 viscous_friction=0
    HuntCrossleyForce ForceGround_Foot_7_L_B: transition_velocity=0.13
      ContactParametersSet contact_parameters:
        ContactParameters: geometry=(ground_Foot_L_B Sphere_Foot_7_L) stiffness=10000000 dissipation=0
            static_friction=0 dynamic_friction=0 viscous_friction=0
    HuntCrossleyForce ForceGround_Foot_8_R_A: transition_velocity=0.13
      ContactParametersSet contact_parameters:
        ContactParameters: geometry=(ground_Foot_R_A Sphere_Foot_8_R) stiffness=10000000 dissipation=0
            static_friction=0 dynamic_friction=0 viscous_friction=0
    HuntCrossleyForce ForceGround_Foot_8_R_B: transition_velocity=0.13
      ContactParametersSet contact_parameters:
        ContactParameters: geometry=(ground_Foot_R_B Sphere_Foot_8_R) stiffness=10000000 dissipation=0
            static_friction=0 dynamic_friction=0 viscous_friction=0
    HuntCrossleyForce ForceGround_Foot_8_L_A: transition_velocity=0.13
      ContactParametersSet contact_parameters:
        ContactParameters: geometry=(ground_Foot_L_A Sphere_Foot_8_L) stiffness=10000000 dissipation=0
            static_friction=0 dynamic_friction=0 viscous_friction=0
    HuntCrossleyForce ForceGround_Foot_8_L_B: transition_velocity=0.13
      ContactParametersSet contact_parameters:
        ContactParameters: geometry=(ground_Foot_L_B Sphere_Foot_8_L) stiffness=10000000 dissipation=0
            static_friction=0 dynamic_friction=0 viscous_friction=0
    HuntCrossleyForce ForceGround_Foot_9_R_A: transition_velocity=0.13
      ContactParametersSet contact_parameters:
        ContactParameters: geometry=(ground_Foot_R_A Sphere_Foot_9_R) stiffness=10000000 dissipation=0
            static_friction=0 dynamic_friction=0 viscous_friction=0
    HuntCrossleyForce ForceGround_Foot_9_R_B: transition_velocity=0.13
      ContactParametersSet contact_parameters:
        ContactParameters: geometry=(ground_Foot_R_B Sphere_Foot_9_R) stiffness=10000000 dissipation=0
            static_friction=0 dynamic_friction=0 viscous_friction=0
    HuntCrossleyForce ForceGround_Foot_9_L_A: transition_velocity=0.13
      ContactParametersSet contact_parameters:
        ContactParameters: geometry=(ground_Foot_L_A Sphere_Foot_9_L) stiffness=10000000 dissipation=0
            static_friction=0 dynamic_friction=0 viscous_friction=0
    HuntCrossleyForce ForceGround_Foot_9_L_B: transition_velocity=0.13
      ContactParametersSet contact_parameters:
        ContactParameters: geometry=(ground_Foot_L_B Sphere_Foot_9_L) stiffness=10000000 dissipation=0
            static_friction=0 dynamic_friction=0 viscous_friction=0
    HuntCrossleyForce ForceGround_Foot_10_R_A: transition_velocity=0.13
      ContactParametersSet contact_parameters:
        ContactParameters: geometry=(ground_Foot_R_A Sphere_Foot_10_R) stiffness=10000000 dissipation=0
            static_friction=0 dynamic_friction=0 viscous_friction=0
    HuntCrossleyForce ForceGround_Foot_10_R_B: transition_velocity=0.13
      ContactParametersSet contact_parameters:
        ContactParameters: geometry=(ground_Foot_R_B Sphere_Foot_10_R) stiffness=10000000 dissipation=0
            static_friction=0 dynamic_friction=0 viscous_friction=0
    HuntCrossleyForce ForceGround_Foot_10_L_A: transition_velocity=0.13
      ContactParametersSet contact_parameters:
        ContactParameters: geometry=(ground_Foot_L_A Sphere_Foot_10_L) stiffness=10000000 dissipation=0
            static_friction=0 dynamic_friction=0 viscous_friction=0
    HuntCrossleyForce ForceGround_Foot_10_L_B: transition_velocity=0.13
      ContactParametersSet contact_parameters:
        ContactParameters: geometry=(ground_Foot_L_B Sphere_Foot_10_L) stiffness=10000000 dissipation=0
            static_friction=0 dynamic_friction=0 viscous_friction=0
    HuntCrossleyForce ForceGround_Foot_11_R_A: transition_velocity=0.13
      ContactParametersSet contact_parameters:
        ContactParameters: geometry=(ground_Foot_R_A Sphere_Foot_11_R) stiffness=10000000 dissipation=0
            static_friction=0 dynamic_friction=0 viscous_friction=0
    HuntCrossleyForce ForceGround_Foot_11_R_B: transition_velocity=0.13
      ContactParametersSet contact_parameters:
        ContactParameters: geometry=(ground_Foot_R_B Sphere_Foot_11_R) stiffness=10000000 dissipation=0
            static_friction=0 dynamic_friction=0 viscous_friction=0
    HuntCrossleyForce ForceGround_Foot_11_L_A: transition_velocity=0.13
      ContactParametersSet contact_parameters:
        ContactParameters: geometry=(ground_Foot_L_A Sphere_Foot_11_L) stiffness=10000000 dissipation=0
            static_friction=0 dynamic_friction=0 viscous_friction=0
    HuntCrossleyForce ForceGround_Foot_11_L_B: transition_velocity=0.13
      ContactParametersSet contact_parameters:
        ContactParameters: geometry=(ground_Foot_L_B Sphere_Foot_11_L) stiffness=10000000 dissipation=0
            static_friction=0 dynamic_friction=0 viscous_friction=0
    HuntCrossleyForce ForceGround_Foot_12_R_A: transition_velocity=0.13
      ContactParametersSet contact_parameters:
        ContactParameters: geometry=(ground_Foot_R_A Sphere_Foot_12_R) stiffness=10000000 dissipation=0
            static_friction=0 dynamic_friction=0 viscous_friction=0
    HuntCrossleyForce ForceGround_Foot_12_R_B: transition_velocity=0.13
      ContactParametersSet contact_parameters:
        ContactParameters: geometry=(ground_Foot_R_B Sphere_Foot_12_R) stiffness=10000000 dissipation=0
            static_friction=0 dynamic_friction=0 viscous_friction=0
    HuntCrossleyForce ForceGround_Foot_12_L_A: transition_velocity=0.13
      ContactParametersSet contact_parameters:
        ContactParameters: geometry=(ground_Foot_L_A Sphere_Foot_12_L) stiffness=10000000 dissipation=0
            static_friction=0 dynamic_friction=0 viscous_friction=0
    HuntCrossleyForce ForceGround_Foot_12_L_B: transition_velocity=0.13
      ContactParametersSet contact_parameters:
        ContactParameters: geometry=(ground_Foot_L_B Sphere_Foot_12_L) stiffness=10000000 dissipation=0
            static_friction=0 dynamic_friction=0 viscous_friction=0
    HuntCrossleyForce ForceGround_Foot_13_R_A: transition_velocity=0.13
      ContactParametersSet contact_parameters:
        ContactParameters: geometry=(ground_Foot_R_A Sphere_Foot_13_R) stiffness=10000000 dissipation=0
            static_friction=0 dynamic_friction=0 viscous_friction=0
    HuntCrossleyForce ForceGround_Foot_13_R_B: transition_velocity=0.13
      ContactParametersSet contact_parameters:
        ContactParameters: geometry=(ground_Foot_R_B Sphere_Foot_13_R) stiffness=10000000 dissipation=0
            static_friction=0 dynamic_friction=0 viscous_friction=0
    HuntCrossleyForce ForceGround_Foot_13_L_A: transition_velocity=0.13
      ContactParametersSet contact_parameters:
        ContactParameters: geometry=(ground_Foot_L_A Sphere_Foot_13_L) stiffness=10000000 dissipation=0
            static_friction=0 dynamic_friction=0 viscous_friction=0
    HuntCrossleyForce ForceGround_Foot_13_L_B: transition_velocity=0.13
      ContactParametersSet contact_parameters:
        ContactParameters: geometry=(ground_Foot_L_B Sphere_Foot_13_L) stiffness=10000000 dissipation=0
            static_friction=0 dynamic_friction=0 viscous_friction=0
    HuntCrossleyForce ForceGround_Foot_14_R_A: transition_velocity=0.13
      ContactParametersSet contact_parameters:
        ContactParameters: geometry=(ground_Foot_R_A Sphere_Foot_14_R) stiffness=10000000 dissipation=0
            static_friction=0 dynamic_friction=0 viscous_friction=0
    HuntCrossleyForce ForceGround_Foot_14_R_B: transition_velocity=0.13
      ContactParametersSet contact_parameters:
        ContactParameters: geometry=(ground_Foot_R_B Sphere_Foot_14_R) stiffness=10000000 dissipation=0
            static_friction=0 dynamic_friction=0 viscous_friction=0
    HuntCrossleyForce ForceGround_Foot_14_L_A: transition_velocity=0.13
      ContactParametersSet contact_parameters:
        ContactParameters: geometry=(ground_Foot_L_A Sphere_Foot_14_L) stiffness=10000000 dissipation=0
            static_friction=0 dynamic_friction=0 viscous_friction=0
    HuntCrossleyForce ForceGround_Foot_14_L_B: transition_velocity=0.13
      ContactParametersSet contact_parameters:
        ContactParameters: geometry=(ground_Foot_L_B Sphere_Foot_14_L) stiffness=10000000 dissipation=0
            static_friction=0 dynamic_friction=0 viscous_friction=0
    HuntCrossleyForce ForceGround_Hand_R: transition_velocity=0.13
      ContactParametersSet contact_parameters:
        ContactParameters: geometry=(ground_Hand_R Sphere_Hand_R) stiffness=10000000 dissipation=0 static_friction=0
            dynamic_friction=0 viscous_friction=0
    HuntCrossleyForce ForceGround_Hand_L: transition_velocity=0.13
      ContactParametersSet contact_parameters:
        ContactParameters: geometry=(ground_Hand_L Sphere_Hand_L) stiffness=10000000 dissipation=0 static_friction=0
            dynamic_friction=0 viscous_friction=0
    ObjectGroup right_leg: members=(addbrev_r addlong_r addmagDist_r addmagIsch_r addmagMid_r addmagProx_r bflh_r bfsh_r edl_r ehl_r fdl_r fhl_r gaslat_r gasmed_r glmax1_r glmax2_r glmax3_r glmed1_r glmed2_r glmed3_r glmin1_r glmin2_r glmin3_r grac_r iliacus_r perbrev_r perlong_r piri_r psoas_r recfem_r sart_r semimem_r semiten_r soleus_r tfl_r tibant_r tibpost_r vasint_r vaslat_r vasmed_r)
    ObjectGroup left_leg: members=(addbrev_l addlong_l addmagDist_l addmagIsch_l addmagMid_l addmagProx_l bflh_l bfsh_l edl_l ehl_l fdl_l fhl_l gaslat_l gasmed_l glmax1_l glmax2_l glmax3_l glmed1_l glmed2_l glmed3_l glmin1_l glmin2_l glmin3_l grac_l iliacus_l perbrev_l perlong_l piri_l psoas_l recfem_l sart_l semimem_l semiten_l soleus_l tfl_l tibant_l tibpost_l vasint_l vaslat_l vasmed_l)
    ObjectGroup hip_add_r: members=(addbrev_r addlong_r addmagDist_r addmagIsch_r addmagMid_r addmagProx_r bflh_r grac_r semimem_r semiten_r)
    ObjectGroup hip_abd_r: members=(glmax1_r glmed1_r glmed2_r glmed3_r glmin1_r glmin2_r glmin3_r piri_r sart_r tfl_r)
    ObjectGroup hip_flex_r: members=(addbrev_r addlong_r glmin1_r grac_r iliacus_r psoas_r recfem_r sart_r tfl_r)
    ObjectGroup hip_ext_r: members=(addlong_r addmagDist_r addmagIsch_r addmagMid_r addmagProx_r bflh_r glmax1_r glmax2_r glmax3_r glmed1_r glmed2_r glmed3_r glmin3_r semimem_r semiten_r)
    ObjectGroup hip_inrot_r: members=(glmed1_r glmed2_r glmed3_r glmin1_r iliacus_r psoas_r tfl_r)
    ObjectGroup hip_exrot_r: members=(glmin3_r piri_r)
    ObjectGroup knee_flex_r: members=(bflh_r bfsh_r gaslat_r gasmed_r grac_r sart_r semimem_r semiten_r)
    ObjectGroup knee_ext_r: members=(recfem_r vasint_r vaslat_r vasmed_r)
    ObjectGroup ankle_df_r: members=(edl_r ehl_r tibant_r)
    ObjectGroup ankle_pf_r: members=(fdl_r fhl_r gaslat_r gasmed_r perbrev_r perlong_r soleus_r tibpost_r)
    ObjectGroup everter_r: members=(edl_r perbrev_r perlong_r)
    ObjectGroup inverter_r: members=(ehl_r fdl_r fhl_r tibant_r tibpost_r)
    ObjectGroup hip_add_l: members=(addbrev_l addlong_l addmagDist_l addmagIsch_l addmagMid_l addmagProx_l bflh_l grac_l semimem_l semiten_l)
    ObjectGroup hip_abd_l: members=(glmax1_l glmed1_l glmed2_l glmed3_l glmin1_l glmin2_l glmin3_l piri_l sart_l tfl_l)
    ObjectGroup hip_flex_l: members=(addbrev_l addlong_l glmin1_l grac_l iliacus_l psoas_l recfem_l sart_l tfl_l)
    ObjectGroup hip_ext_l: members=(addlong_l addmagDist_l addmagIsch_l addmagMid_l addmagProx_l bflh_l glmax1_l glmax2_l glmax3_l glmed1_l glmed2_l glmed3_l glmin3_l semimem_l semiten_l)
    ObjectGroup hip_exrot_l: members=(glmin3_l piri_l)
    ObjectGroup hip_inrot_l: members=(glmed1_l glmed2_l glmed3_l glmin1_l iliacus_l psoas_l tfl_l)
    ObjectGroup knee_flex_l: members=(bflh_l bfsh_l gaslat_l gasmed_l grac_l sart_l semimem_l semiten_l)
    ObjectGroup knee_ext_l: members=(recfem_l vasint_l vaslat_l vasmed_l)
    ObjectGroup ankle_df_l: members=(edl_l ehl_l tibant_l)
    ObjectGroup ankle_pf_l: members=(fdl_l fhl_l gaslat_l gasmed_l perbrev_l perlong_l soleus_l tibpost_l)
    ObjectGroup everter_l: members=(edl_l perbrev_l perlong_l)
    ObjectGroup inverter_l: members=(ehl_l fdl_l fhl_l tibant_l tibpost_l)
  MarkerSet:
    Marker r.ASIS_study: pelvis (0.007240925 0.02055864 0.1802808)
    Marker L.ASIS_study: pelvis (0.01890366 0.01910559 -0.1767196)
    Marker r.PSIS_study: pelvis (-0.1912642 0.02987648 0.07021857)
    Marker L.PSIS_study: pelvis (-0.1861104 0.02880266 -0.06920095)
    Marker r_knee_study: femur_r (-0.00876251 -0.4100145 0.07674813)
    Marker r_mknee_study: femur_r (-0.004569853 -0.4029887 -0.03715355)
    Marker r_ankle_study: tibia_r (-0.01392297 -0.3665133 0.04057917)
    Marker r_mankle_study: tibia_r (0.009829002 -0.3597655 -0.0374828)
    Marker r_toe_study: calcn_r (0.1689013 0.01375551 0.00203685)
    Marker r_5meta_study: calcn_r (0.1213062 0.008254063 0.04804074)
    Marker r_calc_study: calcn_r (-0.01515632 0.02954021 -0.01576351)
    Marker L_knee_study: femur_l (0.004338222 -0.413079 -0.07649528)
    Marker L_mknee_study: femur_l (0.007090387 -0.4075538 0.04151659)
    Marker L_ankle_study: tibia_l (-0.01454174 -0.3629255 -0.04328753)
    Marker L_mankle_study: tibia_l (0.007708947 -0.3556189 0.03812425)
    Marker L_toe_study: calcn_l (0.163266 0.007421779 -0.002221323)
    Marker L_calc_study: calcn_l (-0.01904636 0.02880229 0.01526885)
    Marker L_5meta_study: calcn_l (0.1172362 0.006784213 -0.04944509)
    Marker r_shoulder_study: torso (0.0411625 0.4359619 0.1783126)
    Marker L_shoulder_study: torso (0.02728886 0.4388089 -0.1800194)
    Marker C7_study: torso (-0.06605595 0.4491873 0.003772988)
    Marker r_lelbow_study: humerus_r (0.01653802 -0.3087096 0.04410137) fixed=true
    Marker r_melbow_study: humerus_r (0.002480702 -0.3153248 -0.05512672) fixed=true
    Marker r_lwrist_study: radius_r (0.0005197648 -0.2338942 0.05197648) fixed=true
    Marker r_mwrist_study: radius_r (-0.02286965 -0.2338942 -0.02286965) fixed=true
    Marker L_lelbow_study: humerus_l (0.01653802 -0.3087096 -0.04410137) fixed=true
    Marker L_melbow_study: humerus_l (0.002480702 -0.3153248 0.05512672) fixed=true
    Marker L_lwrist_study: radius_l (0.0005197648 -0.2338942 -0.05197648) fixed=true
    Marker L_mwrist_study: radius_l (-0.02286965 -0.2338942 0.02286965) fixed=true
    Marker r_thigh1_study: femur_r (0.06796429 -0.1545645 0.08677082)
    Marker r_thigh2_study: femur_r (0.0348645 -0.2563719 0.104314)
    Marker r_thigh3_study: femur_r (-0.03924873 -0.1470934 0.1106803)
    Marker L_thigh1_study: femur_l (0.07804553 -0.1544782 -0.08685394)
    Marker L_thigh2_study: femur_l (0.04670303 -0.2564502 -0.1052097)
    Marker L_thigh3_study: femur_l (-0.02911023 -0.1484978 -0.1158094)
    Marker r_sh1_study: tibia_r (-0.01612717 -0.1034931 0.07506108)
    Marker r_sh2_study: tibia_r (0.01058399 -0.2141811 0.07631043)
    Marker r_sh3_study: tibia_r (-0.04896707 -0.2087222 0.07334546)
    Marker L_sh1_study: tibia_l (-0.00435106 -0.1063921 -0.07428385)
    Marker L_sh2_study: tibia_l (0.01967869 -0.2162089 -0.07760787)
    Marker L_sh3_study: tibia_l (-0.04475891 -0.2063669 -0.07600712)
    Marker RHJC_study: pelvis (-0.08513276 -0.09424647 0.1055505)
    Marker LHJC_study: pelvis (-0.0782622 -0.09512397 -0.1099214)
  ContactGeometrySet:
    ContactSphere Sphere_Foot_1_R: socket_frame=/bodyset/calcn_r location=(0.008188597 -0.02341452 -0.008188597)
        radius=0.02
    ContactSphere Sphere_Foot_1_L: socket_frame=/bodyset/calcn_l location=(0.008188597 -0.03626935 0.008188597)
        radius=0.02
    ContactSphere Sphere_Foot_2_R: socket_frame=/bodyset/calcn_r location=(0.008188597 -0.02083333 0.008188597)
        radius=0.02
    ContactSphere Sphere_Foot_2_L: socket_frame=/bodyset/calcn_l location=(0.008188597 -0.03215469 -0.008188597)
        radius=0.02
    ContactSphere Sphere_Foot_3_R: socket_frame=/bodyset/calcn_r location=(0.03684869 -0.0263458 -0.01637719)
        radius=0.02
    ContactSphere Sphere_Foot_3_L: socket_frame=/bodyset/calcn_l location=(0.03684869 -0.03812254 0.01637719)
        radius=0.02
    ContactSphere Sphere_Foot_4_R: socket_frame=/bodyset/calcn_r location=(0.03684869 -0.02117928 0.01637719)
        radius=0.02
    ContactSphere Sphere_Foot_4_L: socket_frame=/bodyset/calcn_l location=(0.03684869 -0.02989322 -0.01637719)
        radius=0.02
    ContactSphere Sphere_Foot_5_R: socket_frame=/bodyset/toes_r location=(0.02784123 -0.02558274 -0.008188597)
        radius=0.02
    ContactSphere Sphere_Foot_5_L: socket_frame=/bodyset/toes_l location=(0.02784123 -0.02760783 0.008188597)
        radius=0.02
    ContactSphere Sphere_Foot_6_R: socket_frame=/bodyset/toes_r location=(0.02784123 -0.02167368 0.01637719)
        radius=0.02
    ContactSphere Sphere_Foot_6_L: socket_frame=/bodyset/toes_l location=(0.02784123 -0.02184693 -0.01637719)
        radius=0.02
    ContactSphere Sphere_Foot_7_R: socket_frame=/bodyset/calcn_r location=(0.04913158 -0.02699837 -0.0122829)
        radius=0.02
    ContactSphere Sphere_Foot_7_L: socket_frame=/bodyset/calcn_l location=(0.04913158 -0.03692306 0.0122829)
        radius=0.02
    ContactSphere Sphere_Foot_8_R: socket_frame=/bodyset/calcn_r location=(0.04913158 -0.02049666 0.02866009)
        radius=0.02
    ContactSphere Sphere_Foot_8_L: socket_frame=/bodyset/calcn_l location=(0.04913158 -0.02664851 -0.02866009)
        radius=0.02
    ContactSphere Sphere_Foot_9_R: socket_frame=/bodyset/calcn_r location=(0.08598027 -0.02782757 -0.004094299)
        radius=0.02
    ContactSphere Sphere_Foot_9_L: socket_frame=/bodyset/calcn_l location=(0.08598027 -0.03452875 0.004094299)
        radius=0.02
    ContactSphere Sphere_Foot_10_R: socket_frame=/bodyset/calcn_r location=(0.08598027 -0.02089374 0.03684869)
        radius=0.02
    ContactSphere Sphere_Foot_10_L: socket_frame=/bodyset/calcn_l location=(0.08598027 -0.02426457 -0.03684869)
        radius=0.02
    ContactSphere Sphere_Foot_11_R: socket_frame=/bodyset/calcn_r location=(0.1146404 -0.02776464 -0.004094299)
        radius=0.02
    ContactSphere Sphere_Foot_11_L: socket_frame=/bodyset/calcn_l location=(0.1146404 -0.03426317 0.004094299)
        radius=0.02
    ContactSphere Sphere_Foot_12_R: socket_frame=/bodyset/calcn_r location=(0.1146404 -0.02093738 0.03684869)
        radius=0.02
    ContactSphere Sphere_Foot_12_L: socket_frame=/bodyset/calcn_l location=(0.1146404 -0.02399898 -0.03684869)
        radius=0.02
    ContactSphere Sphere_Foot_13_R: socket_frame=/bodyset/toes_r location=(-3.064274e-18 -0.0254776 -0.004094299)
        radius=0.02
    ContactSphere Sphere_Foot_13_L: socket_frame=/bodyset/toes_l location=(-3.473556e-18 -0.03216169 0.004094299)
        radius=0.02
    ContactSphere Sphere_Foot_14_R: socket_frame=/bodyset/toes_r location=(-2.785019e-18 -0.02091702 0.02456579)
        radius=0.02
    ContactSphere Sphere_Foot_14_L: socket_frame=/bodyset/toes_l location=(-3.033606e-18 -0.02497676 -0.02456579)
        radius=0.02
    ContactSphere Sphere_Hand_R: socket_frame=/bodyset/hand_r location=(0 -0.07078677 0) radius=0.08
    ContactSphere Sphere_Hand_L: socket_frame=/bodyset/hand_l location=(0 -0.07078677 0) radius=0.08
    ContactHalfSpace [values shared by the 6 below unless stated]: socket_frame=/ground orientation=(0 0 -1.570796)
    ContactHalfSpace ground_Foot_L_A: location=(0 0 0)
    ContactHalfSpace ground_Foot_R_A: location=(0 0 0)
    ContactHalfSpace ground_Foot_L_B: location=(0 0 0)
    ContactHalfSpace ground_Foot_R_B: location=(0 0 0)
    ContactHalfSpace ground_Hand_R: location=(0 0 0)
    ContactHalfSpace ground_Hand_L: location=(0 0 0)
